// SBML level 3 version 2

model biocrnpyler_996679()
  // model units - substance: mole, time: second, volume: litre, area: square_metre, length: metre, extent: mole

  // Compartments:
  compartment default = 1e-6;

  // Species:
  species protein_RNAase in default = 6;
  species complex_protein_RNAase_rna_vioA in default = 0;
  species rna_vioA in default = 0;
  species dna_dna_vioA in default = 0;
  species ribosome_Ribo in default = 0;
  species protein_RNAP in default = 3;
  species protein_VioA in default = 0;
  species complex_dna_dna_vioA_protein_RNAP in default = 0;
  species complex_ribosome_Ribo_rna_vioA in default = 0;
  species rna_vioB in default = 0;
  species complex_ribosome_Ribo_rna_vioB in default = 0;
  species dna_dna_vioB in default = 0;
  species complex_dna_dna_vioB_protein_RNAP in default = 0;
  species complex_protein_RNAase_rna_vioB in default = 0;
  species protein_VioB in default = 0;
  species complex_protein_RNAase_rna_vioE in default = 0;
  species rna_vioE in default = 0;
  species dna_dna_vioE in default = 0;
  species complex_ribosome_Ribo_rna_vioE in default = 0;
  species protein_VioE in default = 0;
  species complex_dna_dna_vioE_protein_RNAP in default = 0;
  species dna_dna_vioD in default = 0;
  species complex_protein_RNAase_rna_vioD in default = 0;
  species complex_ribosome_Ribo_rna_vioD in default = 0;
  species rna_vioD in default = 0;
  species complex_dna_dna_vioD_protein_RNAP in default = 0;
  species protein_VioD in default = 0;
  species TRP in default = 0;
  species IPA_imine in default = 0;
  species IPA_imine_dimer in default = 0;
  species PTDVA in default = 0;
  species PTVA in default = 0;
  species protein_Ribo in default = 24;

  // Reactions:
  r0: dna_dna_vioA + protein_RNAP => complex_dna_dna_vioA_protein_RNAP; r0_k*dna_dna_vioA*protein_RNAP;
    r0_k = 100;
  r0_1: complex_dna_dna_vioA_protein_RNAP => dna_dna_vioA + protein_RNAP; r0_1_k*complex_dna_dna_vioA_protein_RNAP;
    r0_1_k = 10;
  r2: complex_dna_dna_vioA_protein_RNAP => dna_dna_vioA + rna_vioA + protein_RNAP; r2_k*complex_dna_dna_vioA_protein_RNAP;
    r2_k = 0.05;
  r3: rna_vioA + ribosome_Ribo => complex_ribosome_Ribo_rna_vioA; r3_k*rna_vioA*ribosome_Ribo;
    r3_k = 100;
  r3_1: complex_ribosome_Ribo_rna_vioA => rna_vioA + ribosome_Ribo; r3_1_k*complex_ribosome_Ribo_rna_vioA;
    r3_1_k = 10;
  r5: complex_ribosome_Ribo_rna_vioA => rna_vioA + protein_VioA + ribosome_Ribo; r5_k*complex_ribosome_Ribo_rna_vioA;
    r5_k = 0.05;
  r6: rna_vioA + protein_RNAase => complex_protein_RNAase_rna_vioA; r6_k*rna_vioA*protein_RNAase;
    r6_k = 100;
  r6_1: complex_protein_RNAase_rna_vioA => rna_vioA + protein_RNAase; r6_1_k*complex_protein_RNAase_rna_vioA;
    r6_1_k = 10;
  r8: complex_protein_RNAase_rna_vioA => protein_RNAase; r8_k*complex_protein_RNAase_rna_vioA;
    r8_k = 0.001;
  r9: dna_dna_vioB + protein_RNAP => complex_dna_dna_vioB_protein_RNAP; r9_k*dna_dna_vioB*protein_RNAP;
    r9_k = 100;
  r9_1: complex_dna_dna_vioB_protein_RNAP => dna_dna_vioB + protein_RNAP; r9_1_k*complex_dna_dna_vioB_protein_RNAP;
    r9_1_k = 10;
  r11: complex_dna_dna_vioB_protein_RNAP => dna_dna_vioB + rna_vioB + protein_RNAP; r11_k*complex_dna_dna_vioB_protein_RNAP;
    r11_k = 0.05;
  r12: rna_vioB + ribosome_Ribo => complex_ribosome_Ribo_rna_vioB; r12_k*rna_vioB*ribosome_Ribo;
    r12_k = 100;
  r12_1: complex_ribosome_Ribo_rna_vioB => rna_vioB + ribosome_Ribo; r12_1_k*complex_ribosome_Ribo_rna_vioB;
    r12_1_k = 10;
  r14: complex_ribosome_Ribo_rna_vioB => rna_vioB + protein_VioB + ribosome_Ribo; r14_k*complex_ribosome_Ribo_rna_vioB;
    r14_k = 0.05;
  r15: rna_vioB + protein_RNAase => complex_protein_RNAase_rna_vioB; r15_k*rna_vioB*protein_RNAase;
    r15_k = 100;
  r15_1: complex_protein_RNAase_rna_vioB => rna_vioB + protein_RNAase; r15_1_k*complex_protein_RNAase_rna_vioB;
    r15_1_k = 10;
  r17: complex_protein_RNAase_rna_vioB => protein_RNAase; r17_k*complex_protein_RNAase_rna_vioB;
    r17_k = 0.001;
  r18: dna_dna_vioE + protein_RNAP => complex_dna_dna_vioE_protein_RNAP; r18_k*dna_dna_vioE*protein_RNAP;
    r18_k = 100;
  r18_1: complex_dna_dna_vioE_protein_RNAP => dna_dna_vioE + protein_RNAP; r18_1_k*complex_dna_dna_vioE_protein_RNAP;
    r18_1_k = 10;
  r20: complex_dna_dna_vioE_protein_RNAP => dna_dna_vioE + rna_vioE + protein_RNAP; r20_k*complex_dna_dna_vioE_protein_RNAP;
    r20_k = 0.05;
  r21: rna_vioE + ribosome_Ribo => complex_ribosome_Ribo_rna_vioE; r21_k*rna_vioE*ribosome_Ribo;
    r21_k = 100;
  r21_1: complex_ribosome_Ribo_rna_vioE => rna_vioE + ribosome_Ribo; r21_1_k*complex_ribosome_Ribo_rna_vioE;
    r21_1_k = 10;
  r23: complex_ribosome_Ribo_rna_vioE => rna_vioE + protein_VioE + ribosome_Ribo; r23_k*complex_ribosome_Ribo_rna_vioE;
    r23_k = 0.05;
  r24: rna_vioE + protein_RNAase => complex_protein_RNAase_rna_vioE; r24_k*rna_vioE*protein_RNAase;
    r24_k = 100;
  r24_1: complex_protein_RNAase_rna_vioE => rna_vioE + protein_RNAase; r24_1_k*complex_protein_RNAase_rna_vioE;
    r24_1_k = 10;
  r26: complex_protein_RNAase_rna_vioE => protein_RNAase; r26_k*complex_protein_RNAase_rna_vioE;
    r26_k = 0.001;
  r27: dna_dna_vioD + protein_RNAP => complex_dna_dna_vioD_protein_RNAP; r27_k*dna_dna_vioD*protein_RNAP;
    r27_k = 100;
  r27_1: complex_dna_dna_vioD_protein_RNAP => dna_dna_vioD + protein_RNAP; r27_1_k*complex_dna_dna_vioD_protein_RNAP;
    r27_1_k = 10;
  r29: complex_dna_dna_vioD_protein_RNAP => dna_dna_vioD + rna_vioD + protein_RNAP; r29_k*complex_dna_dna_vioD_protein_RNAP;
    r29_k = 0.05;
  r30: rna_vioD + ribosome_Ribo => complex_ribosome_Ribo_rna_vioD; r30_k*rna_vioD*ribosome_Ribo;
    r30_k = 100;
  r30_1: complex_ribosome_Ribo_rna_vioD => rna_vioD + ribosome_Ribo; r30_1_k*complex_ribosome_Ribo_rna_vioD;
    r30_1_k = 10;
  r32: complex_ribosome_Ribo_rna_vioD => rna_vioD + protein_VioD + ribosome_Ribo; r32_k*complex_ribosome_Ribo_rna_vioD;
    r32_k = 0.05;
  r33: rna_vioD + protein_RNAase => complex_protein_RNAase_rna_vioD; r33_k*rna_vioD*protein_RNAase;
    r33_k = 100;
  r33_1: complex_protein_RNAase_rna_vioD => rna_vioD + protein_RNAase; r33_1_k*complex_protein_RNAase_rna_vioD;
    r33_1_k = 10;
  r35: complex_protein_RNAase_rna_vioD => protein_RNAase; r35_k*complex_protein_RNAase_rna_vioD;
    r35_k = 0.001;
  r36: protein_VioA + TRP => protein_VioA + IPA_imine; r36_k*protein_VioA*TRP;
    r36_k = 10;
  r37: protein_VioB + 2 IPA_imine => protein_VioB + IPA_imine_dimer; r37_k*protein_VioB*IPA_imine^2;
    r37_k = 10;
  r38: protein_VioE + IPA_imine_dimer => protein_VioE + PTDVA; r38_k*protein_VioE*IPA_imine_dimer;
    r38_k = 10;
  r39: protein_VioD + PTDVA => protein_VioD + PTVA; r39_k*protein_VioD*PTDVA;
    r39_k = 10;

  // Unit definitions:
  unit square_metre = metre^2;
end
