// SBML level 3 version 2

model combined_model_of__combined_model_of__combined_model_of__external_environment_model_combined_model_of__combined_model_of__biocrnpyler_321657_combined_model_of__combined_model_of__external_environment_model_combined_model_of__combined_model_of__biocrnpyler_927891()
  // model units - substance: mole, time: second, volume: litre, area: square_metre, length: metre, extent: mole

  // Compartments:
  compartment actual_external_compartment_combined = 5e-6 litre;
  compartment liposome_1_internal = 1e-6;
  compartment liposome_2_internal = 2e-6;

  // Species:
  species complex_protein_RNAase_transcript_vioA_biocrnpyler_321657 in liposome_1_internal = 0;
  species transcript_vioA_biocrnpyler_321657 in liposome_1_internal = 0;
  species enzyme_VioA_biocrnpyler_321657 in liposome_1_internal = 0;
  species protein_RNAP_biocrnpyler_321657 in liposome_1_internal = 3;
  species complex_protein_Ribo_transcript_vioA_biocrnpyler_321657 in liposome_1_internal = 0;
  species protein_RNAase_biocrnpyler_321657 in liposome_1_internal = 6;
  species complex_dna_dna_vioA_protein_RNAP_biocrnpyler_321657 in liposome_1_internal = 0;
  species protein_Ribo_biocrnpyler_321657 in liposome_1_internal = 24;
  species dna_dna_vioA_biocrnpyler_321657 in liposome_1_internal = 10/liposome_1_internal;
  species complex_protein_Ribo_transcript_vioB_biocrnpyler_321657 in liposome_1_internal = 0;
  species complex_protein_RNAase_transcript_vioB_biocrnpyler_321657 in liposome_1_internal = 0;
  species transcript_vioB_biocrnpyler_321657 in liposome_1_internal = 0;
  species enzyme_VioB_biocrnpyler_321657 in liposome_1_internal = 0;
  species complex_dna_dna_vioB_protein_RNAP_biocrnpyler_321657 in liposome_1_internal = 0;
  species dna_dna_vioB_biocrnpyler_321657 in liposome_1_internal = 10/liposome_1_internal;
  species complex_protein_Ribo_transcript_vioE_biocrnpyler_321657 in liposome_1_internal = 0;
  species dna_dna_vioE_biocrnpyler_321657 in liposome_1_internal = 10/liposome_1_internal;
  species transcript_vioE_biocrnpyler_321657 in liposome_1_internal = 0;
  species complex_dna_dna_vioE_protein_RNAP_biocrnpyler_321657 in liposome_1_internal = 0;
  species enzyme_VioE_biocrnpyler_321657 in liposome_1_internal = 0;
  species complex_protein_RNAase_transcript_vioE_biocrnpyler_321657 in liposome_1_internal = 0;
  species transcript_vioD_biocrnpyler_321657 in liposome_1_internal = 0;
  species dna_dna_vioD_biocrnpyler_321657 in liposome_1_internal = 10/liposome_1_internal;
  species complex_protein_Ribo_transcript_vioD_biocrnpyler_321657 in liposome_1_internal = 0;
  species enzyme_VioD_biocrnpyler_321657 in liposome_1_internal = 0;
  species complex_dna_dna_vioD_protein_RNAP_biocrnpyler_321657 in liposome_1_internal = 0;
  species complex_protein_RNAase_transcript_vioD_biocrnpyler_321657 in liposome_1_internal = 0;
  species TRP_biocrnpyler_321657 in liposome_1_internal = 10/liposome_1_internal;
  species IPA_imine_biocrnpyler_321657 in liposome_1_internal = 0;
  species complex_TRP_enzyme_VioA_biocrnpyler_321657 in liposome_1_internal = 0;
  species IPA_imine_dimer_biocrnpyler_321657 in liposome_1_internal = 0;
  species complex_2x_IPA_imine_enzyme_VioB_biocrnpyler_321657 in liposome_1_internal = 0;
  species PTDVA_biocrnpyler_321657 in liposome_1_internal = 0;
  species complex_IPA_imine_dimer_enzyme_VioE_biocrnpyler_321657 in liposome_1_internal = 0;
  species PTVA_biocrnpyler_321657 in liposome_1_internal = 0;
  species complex_PTDVA_enzyme_VioD_biocrnpyler_321657 in liposome_1_internal = 0;
  species enzyme_VioC_biocrnpyler_927891 in liposome_2_internal = 0;
  species protein_RNAP_biocrnpyler_927891 in liposome_2_internal = 3;
  species protein_RNAase_biocrnpyler_927891 in liposome_2_internal = 6;
  species transcript_vioC_biocrnpyler_927891 in liposome_2_internal = 0;
  species protein_Ribo_biocrnpyler_927891 in liposome_2_internal = 24;
  species complex_protein_RNAase_transcript_vioC_biocrnpyler_927891 in liposome_2_internal = 0;
  species complex_protein_Ribo_transcript_vioC_biocrnpyler_927891 in liposome_2_internal = 0;
  species complex_dna_dna_vioC_protein_RNAP_biocrnpyler_927891 in liposome_2_internal = 0;
  species dna_dna_vioC_biocrnpyler_927891 in liposome_2_internal = 10/liposome_2_internal;
  species PTVA_biocrnpyler_927891 in liposome_2_internal = 0;
  species V_biocrnpyler_927891 in liposome_2_internal = 0;
  species complex_PTVA_enzyme_VioC_biocrnpyler_927891 in liposome_2_internal = 0;
  species PTDVA_biocrnpyler_927891 in liposome_2_internal = 0;
  species DV_biocrnpyler_927891 in liposome_2_internal = 0;
  species complex_PTDVA_enzyme_VioC_biocrnpyler_927891 in liposome_2_internal = 0;

  // Reactions:
  r0_biocrnpyler_321657: dna_dna_vioA_biocrnpyler_321657 + protein_RNAP_biocrnpyler_321657 => complex_dna_dna_vioA_protein_RNAP_biocrnpyler_321657; r0_biocrnpyler_321657_k*dna_dna_vioA_biocrnpyler_321657*protein_RNAP_biocrnpyler_321657;
    r0_biocrnpyler_321657_k = 100;
  r0_1_biocrnpyler_321657: complex_dna_dna_vioA_protein_RNAP_biocrnpyler_321657 => dna_dna_vioA_biocrnpyler_321657 + protein_RNAP_biocrnpyler_321657; r0_1_biocrnpyler_321657_k*complex_dna_dna_vioA_protein_RNAP_biocrnpyler_321657;
    r0_1_biocrnpyler_321657_k = 10;
  r2_biocrnpyler_321657: complex_dna_dna_vioA_protein_RNAP_biocrnpyler_321657 => dna_dna_vioA_biocrnpyler_321657 + transcript_vioA_biocrnpyler_321657 + protein_RNAP_biocrnpyler_321657; r2_biocrnpyler_321657_k*complex_dna_dna_vioA_protein_RNAP_biocrnpyler_321657;
    r2_biocrnpyler_321657_k = 0.05;
  r3_biocrnpyler_321657: transcript_vioA_biocrnpyler_321657 + protein_Ribo_biocrnpyler_321657 => complex_protein_Ribo_transcript_vioA_biocrnpyler_321657; r3_biocrnpyler_321657_k*transcript_vioA_biocrnpyler_321657*protein_Ribo_biocrnpyler_321657;
    r3_biocrnpyler_321657_k = 100;
  r3_1_biocrnpyler_321657: complex_protein_Ribo_transcript_vioA_biocrnpyler_321657 => transcript_vioA_biocrnpyler_321657 + protein_Ribo_biocrnpyler_321657; r3_1_biocrnpyler_321657_k*complex_protein_Ribo_transcript_vioA_biocrnpyler_321657;
    r3_1_biocrnpyler_321657_k = 10;
  r5_biocrnpyler_321657: complex_protein_Ribo_transcript_vioA_biocrnpyler_321657 => transcript_vioA_biocrnpyler_321657 + enzyme_VioA_biocrnpyler_321657 + protein_Ribo_biocrnpyler_321657; r5_biocrnpyler_321657_k*complex_protein_Ribo_transcript_vioA_biocrnpyler_321657;
    r5_biocrnpyler_321657_k = 0.05;
  r6_biocrnpyler_321657: transcript_vioA_biocrnpyler_321657 + protein_RNAase_biocrnpyler_321657 => complex_protein_RNAase_transcript_vioA_biocrnpyler_321657; r6_biocrnpyler_321657_k*transcript_vioA_biocrnpyler_321657*protein_RNAase_biocrnpyler_321657;
    r6_biocrnpyler_321657_k = 100;
  r6_1_biocrnpyler_321657: complex_protein_RNAase_transcript_vioA_biocrnpyler_321657 => transcript_vioA_biocrnpyler_321657 + protein_RNAase_biocrnpyler_321657; r6_1_biocrnpyler_321657_k*complex_protein_RNAase_transcript_vioA_biocrnpyler_321657;
    r6_1_biocrnpyler_321657_k = 10;
  r8_biocrnpyler_321657: complex_protein_RNAase_transcript_vioA_biocrnpyler_321657 => protein_RNAase_biocrnpyler_321657; r8_biocrnpyler_321657_k*complex_protein_RNAase_transcript_vioA_biocrnpyler_321657;
    r8_biocrnpyler_321657_k = 0.001;
  r9_biocrnpyler_321657: dna_dna_vioB_biocrnpyler_321657 + protein_RNAP_biocrnpyler_321657 => complex_dna_dna_vioB_protein_RNAP_biocrnpyler_321657; r9_biocrnpyler_321657_k*dna_dna_vioB_biocrnpyler_321657*protein_RNAP_biocrnpyler_321657;
    r9_biocrnpyler_321657_k = 100;
  r9_1_biocrnpyler_321657: complex_dna_dna_vioB_protein_RNAP_biocrnpyler_321657 => dna_dna_vioB_biocrnpyler_321657 + protein_RNAP_biocrnpyler_321657; r9_1_biocrnpyler_321657_k*complex_dna_dna_vioB_protein_RNAP_biocrnpyler_321657;
    r9_1_biocrnpyler_321657_k = 10;
  r11_biocrnpyler_321657: complex_dna_dna_vioB_protein_RNAP_biocrnpyler_321657 => dna_dna_vioB_biocrnpyler_321657 + transcript_vioB_biocrnpyler_321657 + protein_RNAP_biocrnpyler_321657; r11_biocrnpyler_321657_k*complex_dna_dna_vioB_protein_RNAP_biocrnpyler_321657;
    r11_biocrnpyler_321657_k = 0.05;
  r12_biocrnpyler_321657: transcript_vioB_biocrnpyler_321657 + protein_Ribo_biocrnpyler_321657 => complex_protein_Ribo_transcript_vioB_biocrnpyler_321657; r12_biocrnpyler_321657_k*transcript_vioB_biocrnpyler_321657*protein_Ribo_biocrnpyler_321657;
    r12_biocrnpyler_321657_k = 100;
  r12_1_biocrnpyler_321657: complex_protein_Ribo_transcript_vioB_biocrnpyler_321657 => transcript_vioB_biocrnpyler_321657 + protein_Ribo_biocrnpyler_321657; r12_1_biocrnpyler_321657_k*complex_protein_Ribo_transcript_vioB_biocrnpyler_321657;
    r12_1_biocrnpyler_321657_k = 10;
  r14_biocrnpyler_321657: complex_protein_Ribo_transcript_vioB_biocrnpyler_321657 => transcript_vioB_biocrnpyler_321657 + enzyme_VioB_biocrnpyler_321657 + protein_Ribo_biocrnpyler_321657; r14_biocrnpyler_321657_k*complex_protein_Ribo_transcript_vioB_biocrnpyler_321657;
    r14_biocrnpyler_321657_k = 0.05;
  r15_biocrnpyler_321657: transcript_vioB_biocrnpyler_321657 + protein_RNAase_biocrnpyler_321657 => complex_protein_RNAase_transcript_vioB_biocrnpyler_321657; r15_biocrnpyler_321657_k*transcript_vioB_biocrnpyler_321657*protein_RNAase_biocrnpyler_321657;
    r15_biocrnpyler_321657_k = 100;
  r15_1_biocrnpyler_321657: complex_protein_RNAase_transcript_vioB_biocrnpyler_321657 => transcript_vioB_biocrnpyler_321657 + protein_RNAase_biocrnpyler_321657; r15_1_biocrnpyler_321657_k*complex_protein_RNAase_transcript_vioB_biocrnpyler_321657;
    r15_1_biocrnpyler_321657_k = 10;
  r17_biocrnpyler_321657: complex_protein_RNAase_transcript_vioB_biocrnpyler_321657 => protein_RNAase_biocrnpyler_321657; r17_biocrnpyler_321657_k*complex_protein_RNAase_transcript_vioB_biocrnpyler_321657;
    r17_biocrnpyler_321657_k = 0.001;
  r18_biocrnpyler_321657: dna_dna_vioE_biocrnpyler_321657 + protein_RNAP_biocrnpyler_321657 => complex_dna_dna_vioE_protein_RNAP_biocrnpyler_321657; r18_biocrnpyler_321657_k*dna_dna_vioE_biocrnpyler_321657*protein_RNAP_biocrnpyler_321657;
    r18_biocrnpyler_321657_k = 100;
  r18_1_biocrnpyler_321657: complex_dna_dna_vioE_protein_RNAP_biocrnpyler_321657 => dna_dna_vioE_biocrnpyler_321657 + protein_RNAP_biocrnpyler_321657; r18_1_biocrnpyler_321657_k*complex_dna_dna_vioE_protein_RNAP_biocrnpyler_321657;
    r18_1_biocrnpyler_321657_k = 10;
  r20_biocrnpyler_321657: complex_dna_dna_vioE_protein_RNAP_biocrnpyler_321657 => dna_dna_vioE_biocrnpyler_321657 + transcript_vioE_biocrnpyler_321657 + protein_RNAP_biocrnpyler_321657; r20_biocrnpyler_321657_k*complex_dna_dna_vioE_protein_RNAP_biocrnpyler_321657;
    r20_biocrnpyler_321657_k = 0.05;
  r21_biocrnpyler_321657: transcript_vioE_biocrnpyler_321657 + protein_Ribo_biocrnpyler_321657 => complex_protein_Ribo_transcript_vioE_biocrnpyler_321657; r21_biocrnpyler_321657_k*transcript_vioE_biocrnpyler_321657*protein_Ribo_biocrnpyler_321657;
    r21_biocrnpyler_321657_k = 100;
  r21_1_biocrnpyler_321657: complex_protein_Ribo_transcript_vioE_biocrnpyler_321657 => transcript_vioE_biocrnpyler_321657 + protein_Ribo_biocrnpyler_321657; r21_1_biocrnpyler_321657_k*complex_protein_Ribo_transcript_vioE_biocrnpyler_321657;
    r21_1_biocrnpyler_321657_k = 10;
  r23_biocrnpyler_321657: complex_protein_Ribo_transcript_vioE_biocrnpyler_321657 => transcript_vioE_biocrnpyler_321657 + enzyme_VioE_biocrnpyler_321657 + protein_Ribo_biocrnpyler_321657; r23_biocrnpyler_321657_k*complex_protein_Ribo_transcript_vioE_biocrnpyler_321657;
    r23_biocrnpyler_321657_k = 0.05;
  r24_biocrnpyler_321657: transcript_vioE_biocrnpyler_321657 + protein_RNAase_biocrnpyler_321657 => complex_protein_RNAase_transcript_vioE_biocrnpyler_321657; r24_biocrnpyler_321657_k*transcript_vioE_biocrnpyler_321657*protein_RNAase_biocrnpyler_321657;
    r24_biocrnpyler_321657_k = 100;
  r24_1_biocrnpyler_321657: complex_protein_RNAase_transcript_vioE_biocrnpyler_321657 => transcript_vioE_biocrnpyler_321657 + protein_RNAase_biocrnpyler_321657; r24_1_biocrnpyler_321657_k*complex_protein_RNAase_transcript_vioE_biocrnpyler_321657;
    r24_1_biocrnpyler_321657_k = 10;
  r26_biocrnpyler_321657: complex_protein_RNAase_transcript_vioE_biocrnpyler_321657 => protein_RNAase_biocrnpyler_321657; r26_biocrnpyler_321657_k*complex_protein_RNAase_transcript_vioE_biocrnpyler_321657;
    r26_biocrnpyler_321657_k = 0.001;
  r27_biocrnpyler_321657: dna_dna_vioD_biocrnpyler_321657 + protein_RNAP_biocrnpyler_321657 => complex_dna_dna_vioD_protein_RNAP_biocrnpyler_321657; r27_biocrnpyler_321657_k*dna_dna_vioD_biocrnpyler_321657*protein_RNAP_biocrnpyler_321657;
    r27_biocrnpyler_321657_k = 100;
  r27_1_biocrnpyler_321657: complex_dna_dna_vioD_protein_RNAP_biocrnpyler_321657 => dna_dna_vioD_biocrnpyler_321657 + protein_RNAP_biocrnpyler_321657; r27_1_biocrnpyler_321657_k*complex_dna_dna_vioD_protein_RNAP_biocrnpyler_321657;
    r27_1_biocrnpyler_321657_k = 10;
  r29_biocrnpyler_321657: complex_dna_dna_vioD_protein_RNAP_biocrnpyler_321657 => dna_dna_vioD_biocrnpyler_321657 + transcript_vioD_biocrnpyler_321657 + protein_RNAP_biocrnpyler_321657; r29_biocrnpyler_321657_k*complex_dna_dna_vioD_protein_RNAP_biocrnpyler_321657;
    r29_biocrnpyler_321657_k = 0.05;
  r30_biocrnpyler_321657: transcript_vioD_biocrnpyler_321657 + protein_Ribo_biocrnpyler_321657 => complex_protein_Ribo_transcript_vioD_biocrnpyler_321657; r30_biocrnpyler_321657_k*transcript_vioD_biocrnpyler_321657*protein_Ribo_biocrnpyler_321657;
    r30_biocrnpyler_321657_k = 100;
  r30_1_biocrnpyler_321657: complex_protein_Ribo_transcript_vioD_biocrnpyler_321657 => transcript_vioD_biocrnpyler_321657 + protein_Ribo_biocrnpyler_321657; r30_1_biocrnpyler_321657_k*complex_protein_Ribo_transcript_vioD_biocrnpyler_321657;
    r30_1_biocrnpyler_321657_k = 10;
  r32_biocrnpyler_321657: complex_protein_Ribo_transcript_vioD_biocrnpyler_321657 => transcript_vioD_biocrnpyler_321657 + enzyme_VioD_biocrnpyler_321657 + protein_Ribo_biocrnpyler_321657; r32_biocrnpyler_321657_k*complex_protein_Ribo_transcript_vioD_biocrnpyler_321657;
    r32_biocrnpyler_321657_k = 0.05;
  r33_biocrnpyler_321657: transcript_vioD_biocrnpyler_321657 + protein_RNAase_biocrnpyler_321657 => complex_protein_RNAase_transcript_vioD_biocrnpyler_321657; r33_biocrnpyler_321657_k*transcript_vioD_biocrnpyler_321657*protein_RNAase_biocrnpyler_321657;
    r33_biocrnpyler_321657_k = 100;
  r33_1_biocrnpyler_321657: complex_protein_RNAase_transcript_vioD_biocrnpyler_321657 => transcript_vioD_biocrnpyler_321657 + protein_RNAase_biocrnpyler_321657; r33_1_biocrnpyler_321657_k*complex_protein_RNAase_transcript_vioD_biocrnpyler_321657;
    r33_1_biocrnpyler_321657_k = 10;
  r35_biocrnpyler_321657: complex_protein_RNAase_transcript_vioD_biocrnpyler_321657 => protein_RNAase_biocrnpyler_321657; r35_biocrnpyler_321657_k*complex_protein_RNAase_transcript_vioD_biocrnpyler_321657;
    r35_biocrnpyler_321657_k = 0.001;
  r36_biocrnpyler_321657: TRP_biocrnpyler_321657 + enzyme_VioA_biocrnpyler_321657 => complex_TRP_enzyme_VioA_biocrnpyler_321657; r36_biocrnpyler_321657_k*TRP_biocrnpyler_321657*enzyme_VioA_biocrnpyler_321657;
    r36_biocrnpyler_321657_k = 10;
  r36_1_biocrnpyler_321657: complex_TRP_enzyme_VioA_biocrnpyler_321657 => TRP_biocrnpyler_321657 + enzyme_VioA_biocrnpyler_321657; r36_1_biocrnpyler_321657_k*complex_TRP_enzyme_VioA_biocrnpyler_321657;
    r36_1_biocrnpyler_321657_k = 1;
  r38_biocrnpyler_321657: complex_TRP_enzyme_VioA_biocrnpyler_321657 => IPA_imine_biocrnpyler_321657 + enzyme_VioA_biocrnpyler_321657; r38_biocrnpyler_321657_k*complex_TRP_enzyme_VioA_biocrnpyler_321657;
    r38_biocrnpyler_321657_k = 203;
  r39_biocrnpyler_321657: 2 IPA_imine_biocrnpyler_321657 + enzyme_VioB_biocrnpyler_321657 => complex_2x_IPA_imine_enzyme_VioB_biocrnpyler_321657; r39_biocrnpyler_321657_k*IPA_imine_biocrnpyler_321657^2*enzyme_VioB_biocrnpyler_321657;
    r39_biocrnpyler_321657_k = 10;
  r39_1_biocrnpyler_321657: complex_2x_IPA_imine_enzyme_VioB_biocrnpyler_321657 => 2 IPA_imine_biocrnpyler_321657 + enzyme_VioB_biocrnpyler_321657; r39_1_biocrnpyler_321657_k*complex_2x_IPA_imine_enzyme_VioB_biocrnpyler_321657;
    r39_1_biocrnpyler_321657_k = 1;
  r41_biocrnpyler_321657: complex_2x_IPA_imine_enzyme_VioB_biocrnpyler_321657 => IPA_imine_dimer_biocrnpyler_321657 + enzyme_VioB_biocrnpyler_321657; r41_biocrnpyler_321657_k*complex_2x_IPA_imine_enzyme_VioB_biocrnpyler_321657;
    r41_biocrnpyler_321657_k = 4500;
  r42_biocrnpyler_321657: IPA_imine_dimer_biocrnpyler_321657 + enzyme_VioE_biocrnpyler_321657 => complex_IPA_imine_dimer_enzyme_VioE_biocrnpyler_321657; r42_biocrnpyler_321657_k*IPA_imine_dimer_biocrnpyler_321657*enzyme_VioE_biocrnpyler_321657;
    r42_biocrnpyler_321657_k = 100;
  r42_1_biocrnpyler_321657: complex_IPA_imine_dimer_enzyme_VioE_biocrnpyler_321657 => IPA_imine_dimer_biocrnpyler_321657 + enzyme_VioE_biocrnpyler_321657; r42_1_biocrnpyler_321657_k*complex_IPA_imine_dimer_enzyme_VioE_biocrnpyler_321657;
    r42_1_biocrnpyler_321657_k = 10;
  r44_biocrnpyler_321657: complex_IPA_imine_dimer_enzyme_VioE_biocrnpyler_321657 => PTDVA_biocrnpyler_321657 + enzyme_VioE_biocrnpyler_321657; r44_biocrnpyler_321657_k*complex_IPA_imine_dimer_enzyme_VioE_biocrnpyler_321657;
    r44_biocrnpyler_321657_k = 100;
  r45_biocrnpyler_321657: PTDVA_biocrnpyler_321657 + enzyme_VioD_biocrnpyler_321657 => complex_PTDVA_enzyme_VioD_biocrnpyler_321657; r45_biocrnpyler_321657_k*PTDVA_biocrnpyler_321657*enzyme_VioD_biocrnpyler_321657;
    r45_biocrnpyler_321657_k = 100;
  r45_1_biocrnpyler_321657: complex_PTDVA_enzyme_VioD_biocrnpyler_321657 => PTDVA_biocrnpyler_321657 + enzyme_VioD_biocrnpyler_321657; r45_1_biocrnpyler_321657_k*complex_PTDVA_enzyme_VioD_biocrnpyler_321657;
    r45_1_biocrnpyler_321657_k = 10;
  r47_biocrnpyler_321657: complex_PTDVA_enzyme_VioD_biocrnpyler_321657 => PTVA_biocrnpyler_321657 + enzyme_VioD_biocrnpyler_321657; r47_biocrnpyler_321657_k*complex_PTDVA_enzyme_VioD_biocrnpyler_321657;
    r47_biocrnpyler_321657_k = 100;
  r0_biocrnpyler_927891: dna_dna_vioC_biocrnpyler_927891 + protein_RNAP_biocrnpyler_927891 => complex_dna_dna_vioC_protein_RNAP_biocrnpyler_927891; r0_biocrnpyler_927891_k*dna_dna_vioC_biocrnpyler_927891*protein_RNAP_biocrnpyler_927891;
    r0_biocrnpyler_927891_k = 100;
  r0_1_biocrnpyler_927891: complex_dna_dna_vioC_protein_RNAP_biocrnpyler_927891 => dna_dna_vioC_biocrnpyler_927891 + protein_RNAP_biocrnpyler_927891; r0_1_biocrnpyler_927891_k*complex_dna_dna_vioC_protein_RNAP_biocrnpyler_927891;
    r0_1_biocrnpyler_927891_k = 10;
  r2_biocrnpyler_927891: complex_dna_dna_vioC_protein_RNAP_biocrnpyler_927891 => dna_dna_vioC_biocrnpyler_927891 + transcript_vioC_biocrnpyler_927891 + protein_RNAP_biocrnpyler_927891; r2_biocrnpyler_927891_k*complex_dna_dna_vioC_protein_RNAP_biocrnpyler_927891;
    r2_biocrnpyler_927891_k = 0.05;
  r3_biocrnpyler_927891: transcript_vioC_biocrnpyler_927891 + protein_Ribo_biocrnpyler_927891 => complex_protein_Ribo_transcript_vioC_biocrnpyler_927891; r3_biocrnpyler_927891_k*transcript_vioC_biocrnpyler_927891*protein_Ribo_biocrnpyler_927891;
    r3_biocrnpyler_927891_k = 100;
  r3_1_biocrnpyler_927891: complex_protein_Ribo_transcript_vioC_biocrnpyler_927891 => transcript_vioC_biocrnpyler_927891 + protein_Ribo_biocrnpyler_927891; r3_1_biocrnpyler_927891_k*complex_protein_Ribo_transcript_vioC_biocrnpyler_927891;
    r3_1_biocrnpyler_927891_k = 10;
  r5_biocrnpyler_927891: complex_protein_Ribo_transcript_vioC_biocrnpyler_927891 => transcript_vioC_biocrnpyler_927891 + enzyme_VioC_biocrnpyler_927891 + protein_Ribo_biocrnpyler_927891; r5_biocrnpyler_927891_k*complex_protein_Ribo_transcript_vioC_biocrnpyler_927891;
    r5_biocrnpyler_927891_k = 0.05;
  r6_biocrnpyler_927891: transcript_vioC_biocrnpyler_927891 + protein_RNAase_biocrnpyler_927891 => complex_protein_RNAase_transcript_vioC_biocrnpyler_927891; r6_biocrnpyler_927891_k*transcript_vioC_biocrnpyler_927891*protein_RNAase_biocrnpyler_927891;
    r6_biocrnpyler_927891_k = 100;
  r6_1_biocrnpyler_927891: complex_protein_RNAase_transcript_vioC_biocrnpyler_927891 => transcript_vioC_biocrnpyler_927891 + protein_RNAase_biocrnpyler_927891; r6_1_biocrnpyler_927891_k*complex_protein_RNAase_transcript_vioC_biocrnpyler_927891;
    r6_1_biocrnpyler_927891_k = 10;
  r8_biocrnpyler_927891: complex_protein_RNAase_transcript_vioC_biocrnpyler_927891 => protein_RNAase_biocrnpyler_927891; r8_biocrnpyler_927891_k*complex_protein_RNAase_transcript_vioC_biocrnpyler_927891;
    r8_biocrnpyler_927891_k = 0.001;
  r9_biocrnpyler_927891: PTVA_biocrnpyler_927891 + enzyme_VioC_biocrnpyler_927891 => complex_PTVA_enzyme_VioC_biocrnpyler_927891; r9_biocrnpyler_927891_k*PTVA_biocrnpyler_927891*enzyme_VioC_biocrnpyler_927891;
    r9_biocrnpyler_927891_k = 100;
  r9_1_biocrnpyler_927891: complex_PTVA_enzyme_VioC_biocrnpyler_927891 => PTVA_biocrnpyler_927891 + enzyme_VioC_biocrnpyler_927891; r9_1_biocrnpyler_927891_k*complex_PTVA_enzyme_VioC_biocrnpyler_927891;
    r9_1_biocrnpyler_927891_k = 10;
  r11_biocrnpyler_927891: complex_PTVA_enzyme_VioC_biocrnpyler_927891 => V_biocrnpyler_927891 + enzyme_VioC_biocrnpyler_927891; r11_biocrnpyler_927891_k*complex_PTVA_enzyme_VioC_biocrnpyler_927891;
    r11_biocrnpyler_927891_k = 100;
  r12_biocrnpyler_927891: PTDVA_biocrnpyler_927891 + enzyme_VioC_biocrnpyler_927891 => complex_PTDVA_enzyme_VioC_biocrnpyler_927891; r12_biocrnpyler_927891_k*PTDVA_biocrnpyler_927891*enzyme_VioC_biocrnpyler_927891;
    r12_biocrnpyler_927891_k = 100;
  r12_1_biocrnpyler_927891: complex_PTDVA_enzyme_VioC_biocrnpyler_927891 => PTDVA_biocrnpyler_927891 + enzyme_VioC_biocrnpyler_927891; r12_1_biocrnpyler_927891_k*complex_PTDVA_enzyme_VioC_biocrnpyler_927891;
    r12_1_biocrnpyler_927891_k = 10;
  r14_biocrnpyler_927891: complex_PTDVA_enzyme_VioC_biocrnpyler_927891 => DV_biocrnpyler_927891 + enzyme_VioC_biocrnpyler_927891; r14_biocrnpyler_927891_k*complex_PTDVA_enzyme_VioC_biocrnpyler_927891;
    r14_biocrnpyler_927891_k = 100;

  // Unit definitions:
  unit square_metre = metre^2;
  unit per_second = 1 / second;
  unit substance = dimensionless;
end
