// SBML level 3 version 2

model combined_model_of__combined_model_of__external_environment_model_combined_model_of__ahl_membrane_combined_model_of__biocrnpyler_870603()
  // model units - substance: mole, time: second, volume: litre, area: square_metre, length: metre, extent: mole

  // Compartments:
  compartment liposome_1_external_combined = 4e-6 litre;
  compartment liposome_1_internal_combined = 3e-6 litre;

  // Species:
  species PTVA_external_environment_model_1_combined in liposome_1_external_combined = 0;
  species PTDVA_external_environment_model_1_combined in liposome_1_external_combined = 0;
  species complex_dna_dna_vioA_protein_RNAP_biocrnpyler_870603 in liposome_1_internal_combined = 0;
  species enzyme_VioA_biocrnpyler_870603 in liposome_1_internal_combined = 0;
  species dna_dna_vioA_biocrnpyler_870603 in liposome_1_internal_combined = 0;
  species transcript_vioA_biocrnpyler_870603 in liposome_1_internal_combined = 0;
  species complex_protein_Ribo_transcript_vioA_biocrnpyler_870603 in liposome_1_internal_combined = 0;
  species protein_RNAase_biocrnpyler_870603 in liposome_1_internal_combined = 6;
  species complex_protein_RNAase_transcript_vioA_biocrnpyler_870603 in liposome_1_internal_combined = 0;
  species protein_Ribo_biocrnpyler_870603 in liposome_1_internal_combined = 24;
  species protein_RNAP_biocrnpyler_870603 in liposome_1_internal_combined = 3;
  species enzyme_VioB_biocrnpyler_870603 in liposome_1_internal_combined = 0;
  species complex_protein_Ribo_transcript_vioB_biocrnpyler_870603 in liposome_1_internal_combined = 0;
  species transcript_vioB_biocrnpyler_870603 in liposome_1_internal_combined = 0;
  species dna_dna_vioB_biocrnpyler_870603 in liposome_1_internal_combined = 0;
  species complex_protein_RNAase_transcript_vioB_biocrnpyler_870603 in liposome_1_internal_combined = 0;
  species complex_dna_dna_vioB_protein_RNAP_biocrnpyler_870603 in liposome_1_internal_combined = 0;
  species complex_dna_dna_vioE_protein_RNAP_biocrnpyler_870603 in liposome_1_internal_combined = 0;
  species enzyme_VioE_biocrnpyler_870603 in liposome_1_internal_combined = 0;
  species complex_protein_RNAase_transcript_vioE_biocrnpyler_870603 in liposome_1_internal_combined = 0;
  species complex_protein_Ribo_transcript_vioE_biocrnpyler_870603 in liposome_1_internal_combined = 0;
  species dna_dna_vioE_biocrnpyler_870603 in liposome_1_internal_combined = 0;
  species transcript_vioE_biocrnpyler_870603 in liposome_1_internal_combined = 0;
  species dna_dna_vioD_biocrnpyler_870603 in liposome_1_internal_combined = 0;
  species complex_protein_Ribo_transcript_vioD_biocrnpyler_870603 in liposome_1_internal_combined = 0;
  species complex_protein_RNAase_transcript_vioD_biocrnpyler_870603 in liposome_1_internal_combined = 0;
  species enzyme_VioD_biocrnpyler_870603 in liposome_1_internal_combined = 0;
  species transcript_vioD_biocrnpyler_870603 in liposome_1_internal_combined = 0;
  species complex_dna_dna_vioD_protein_RNAP_biocrnpyler_870603 in liposome_1_internal_combined = 0;
  species TRP_biocrnpyler_870603 in liposome_1_internal_combined = 0;
  species IPA_imine_biocrnpyler_870603 in liposome_1_internal_combined = 0;
  species complex_TRP_enzyme_VioA_biocrnpyler_870603 in liposome_1_internal_combined = 0;
  species IPA_imine_dimer_biocrnpyler_870603 in liposome_1_internal_combined = 0;
  species complex_2x_IPA_imine_enzyme_VioB_biocrnpyler_870603 in liposome_1_internal_combined = 0;
  species PTDVA_2_combined in liposome_1_internal_combined = 0;
  species complex_IPA_imine_dimer_enzyme_VioE_biocrnpyler_870603 in liposome_1_internal_combined = 0;
  species PTVA_2_combined in liposome_1_internal_combined = 0;
  species complex_PTDVA_enzyme_VioD_biocrnpyler_870603 in liposome_1_internal_combined = 0;

  // Parameters:
  kb = 10 per_second;
  kd = 2 per_second;

  // Reactions:
  r1: PTVA_2_combined -> PTVA_external_environment_model_1_combined; kb*PTVA_2_combined - kd*PTVA_external_environment_model_1_combined;
  r2: PTDVA_2_combined -> PTDVA_external_environment_model_1_combined; kb*PTDVA_2_combined - kd*PTDVA_external_environment_model_1_combined;
  r0_biocrnpyler_870603: dna_dna_vioA_biocrnpyler_870603 + protein_RNAP_biocrnpyler_870603 => complex_dna_dna_vioA_protein_RNAP_biocrnpyler_870603; r0_biocrnpyler_870603_k*dna_dna_vioA_biocrnpyler_870603*protein_RNAP_biocrnpyler_870603;
    r0_biocrnpyler_870603_k = 100;
  r0_1_biocrnpyler_870603: complex_dna_dna_vioA_protein_RNAP_biocrnpyler_870603 => dna_dna_vioA_biocrnpyler_870603 + protein_RNAP_biocrnpyler_870603; r0_1_biocrnpyler_870603_k*complex_dna_dna_vioA_protein_RNAP_biocrnpyler_870603;
    r0_1_biocrnpyler_870603_k = 10;
  r2_biocrnpyler_870603: complex_dna_dna_vioA_protein_RNAP_biocrnpyler_870603 => dna_dna_vioA_biocrnpyler_870603 + transcript_vioA_biocrnpyler_870603 + protein_RNAP_biocrnpyler_870603; r2_biocrnpyler_870603_k*complex_dna_dna_vioA_protein_RNAP_biocrnpyler_870603;
    r2_biocrnpyler_870603_k = 0.05;
  r3_biocrnpyler_870603: transcript_vioA_biocrnpyler_870603 + protein_Ribo_biocrnpyler_870603 => complex_protein_Ribo_transcript_vioA_biocrnpyler_870603; r3_biocrnpyler_870603_k*transcript_vioA_biocrnpyler_870603*protein_Ribo_biocrnpyler_870603;
    r3_biocrnpyler_870603_k = 100;
  r3_1_biocrnpyler_870603: complex_protein_Ribo_transcript_vioA_biocrnpyler_870603 => transcript_vioA_biocrnpyler_870603 + protein_Ribo_biocrnpyler_870603; r3_1_biocrnpyler_870603_k*complex_protein_Ribo_transcript_vioA_biocrnpyler_870603;
    r3_1_biocrnpyler_870603_k = 10;
  r5_biocrnpyler_870603: complex_protein_Ribo_transcript_vioA_biocrnpyler_870603 => transcript_vioA_biocrnpyler_870603 + enzyme_VioA_biocrnpyler_870603 + protein_Ribo_biocrnpyler_870603; r5_biocrnpyler_870603_k*complex_protein_Ribo_transcript_vioA_biocrnpyler_870603;
    r5_biocrnpyler_870603_k = 0.05;
  r6_biocrnpyler_870603: transcript_vioA_biocrnpyler_870603 + protein_RNAase_biocrnpyler_870603 => complex_protein_RNAase_transcript_vioA_biocrnpyler_870603; r6_biocrnpyler_870603_k*transcript_vioA_biocrnpyler_870603*protein_RNAase_biocrnpyler_870603;
    r6_biocrnpyler_870603_k = 100;
  r6_1_biocrnpyler_870603: complex_protein_RNAase_transcript_vioA_biocrnpyler_870603 => transcript_vioA_biocrnpyler_870603 + protein_RNAase_biocrnpyler_870603; r6_1_biocrnpyler_870603_k*complex_protein_RNAase_transcript_vioA_biocrnpyler_870603;
    r6_1_biocrnpyler_870603_k = 10;
  r8_biocrnpyler_870603: complex_protein_RNAase_transcript_vioA_biocrnpyler_870603 => protein_RNAase_biocrnpyler_870603; r8_biocrnpyler_870603_k*complex_protein_RNAase_transcript_vioA_biocrnpyler_870603;
    r8_biocrnpyler_870603_k = 0.001;
  r9_biocrnpyler_870603: dna_dna_vioB_biocrnpyler_870603 + protein_RNAP_biocrnpyler_870603 => complex_dna_dna_vioB_protein_RNAP_biocrnpyler_870603; r9_biocrnpyler_870603_k*dna_dna_vioB_biocrnpyler_870603*protein_RNAP_biocrnpyler_870603;
    r9_biocrnpyler_870603_k = 100;
  r9_1_biocrnpyler_870603: complex_dna_dna_vioB_protein_RNAP_biocrnpyler_870603 => dna_dna_vioB_biocrnpyler_870603 + protein_RNAP_biocrnpyler_870603; r9_1_biocrnpyler_870603_k*complex_dna_dna_vioB_protein_RNAP_biocrnpyler_870603;
    r9_1_biocrnpyler_870603_k = 10;
  r11_biocrnpyler_870603: complex_dna_dna_vioB_protein_RNAP_biocrnpyler_870603 => dna_dna_vioB_biocrnpyler_870603 + transcript_vioB_biocrnpyler_870603 + protein_RNAP_biocrnpyler_870603; r11_biocrnpyler_870603_k*complex_dna_dna_vioB_protein_RNAP_biocrnpyler_870603;
    r11_biocrnpyler_870603_k = 0.05;
  r12_biocrnpyler_870603: transcript_vioB_biocrnpyler_870603 + protein_Ribo_biocrnpyler_870603 => complex_protein_Ribo_transcript_vioB_biocrnpyler_870603; r12_biocrnpyler_870603_k*transcript_vioB_biocrnpyler_870603*protein_Ribo_biocrnpyler_870603;
    r12_biocrnpyler_870603_k = 100;
  r12_1_biocrnpyler_870603: complex_protein_Ribo_transcript_vioB_biocrnpyler_870603 => transcript_vioB_biocrnpyler_870603 + protein_Ribo_biocrnpyler_870603; r12_1_biocrnpyler_870603_k*complex_protein_Ribo_transcript_vioB_biocrnpyler_870603;
    r12_1_biocrnpyler_870603_k = 10;
  r14_biocrnpyler_870603: complex_protein_Ribo_transcript_vioB_biocrnpyler_870603 => transcript_vioB_biocrnpyler_870603 + enzyme_VioB_biocrnpyler_870603 + protein_Ribo_biocrnpyler_870603; r14_biocrnpyler_870603_k*complex_protein_Ribo_transcript_vioB_biocrnpyler_870603;
    r14_biocrnpyler_870603_k = 0.05;
  r15_biocrnpyler_870603: transcript_vioB_biocrnpyler_870603 + protein_RNAase_biocrnpyler_870603 => complex_protein_RNAase_transcript_vioB_biocrnpyler_870603; r15_biocrnpyler_870603_k*transcript_vioB_biocrnpyler_870603*protein_RNAase_biocrnpyler_870603;
    r15_biocrnpyler_870603_k = 100;
  r15_1_biocrnpyler_870603: complex_protein_RNAase_transcript_vioB_biocrnpyler_870603 => transcript_vioB_biocrnpyler_870603 + protein_RNAase_biocrnpyler_870603; r15_1_biocrnpyler_870603_k*complex_protein_RNAase_transcript_vioB_biocrnpyler_870603;
    r15_1_biocrnpyler_870603_k = 10;
  r17_biocrnpyler_870603: complex_protein_RNAase_transcript_vioB_biocrnpyler_870603 => protein_RNAase_biocrnpyler_870603; r17_biocrnpyler_870603_k*complex_protein_RNAase_transcript_vioB_biocrnpyler_870603;
    r17_biocrnpyler_870603_k = 0.001;
  r18_biocrnpyler_870603: dna_dna_vioE_biocrnpyler_870603 + protein_RNAP_biocrnpyler_870603 => complex_dna_dna_vioE_protein_RNAP_biocrnpyler_870603; r18_biocrnpyler_870603_k*dna_dna_vioE_biocrnpyler_870603*protein_RNAP_biocrnpyler_870603;
    r18_biocrnpyler_870603_k = 100;
  r18_1_biocrnpyler_870603: complex_dna_dna_vioE_protein_RNAP_biocrnpyler_870603 => dna_dna_vioE_biocrnpyler_870603 + protein_RNAP_biocrnpyler_870603; r18_1_biocrnpyler_870603_k*complex_dna_dna_vioE_protein_RNAP_biocrnpyler_870603;
    r18_1_biocrnpyler_870603_k = 10;
  r20_biocrnpyler_870603: complex_dna_dna_vioE_protein_RNAP_biocrnpyler_870603 => dna_dna_vioE_biocrnpyler_870603 + transcript_vioE_biocrnpyler_870603 + protein_RNAP_biocrnpyler_870603; r20_biocrnpyler_870603_k*complex_dna_dna_vioE_protein_RNAP_biocrnpyler_870603;
    r20_biocrnpyler_870603_k = 0.05;
  r21_biocrnpyler_870603: transcript_vioE_biocrnpyler_870603 + protein_Ribo_biocrnpyler_870603 => complex_protein_Ribo_transcript_vioE_biocrnpyler_870603; r21_biocrnpyler_870603_k*transcript_vioE_biocrnpyler_870603*protein_Ribo_biocrnpyler_870603;
    r21_biocrnpyler_870603_k = 100;
  r21_1_biocrnpyler_870603: complex_protein_Ribo_transcript_vioE_biocrnpyler_870603 => transcript_vioE_biocrnpyler_870603 + protein_Ribo_biocrnpyler_870603; r21_1_biocrnpyler_870603_k*complex_protein_Ribo_transcript_vioE_biocrnpyler_870603;
    r21_1_biocrnpyler_870603_k = 10;
  r23_biocrnpyler_870603: complex_protein_Ribo_transcript_vioE_biocrnpyler_870603 => transcript_vioE_biocrnpyler_870603 + enzyme_VioE_biocrnpyler_870603 + protein_Ribo_biocrnpyler_870603; r23_biocrnpyler_870603_k*complex_protein_Ribo_transcript_vioE_biocrnpyler_870603;
    r23_biocrnpyler_870603_k = 0.05;
  r24_biocrnpyler_870603: transcript_vioE_biocrnpyler_870603 + protein_RNAase_biocrnpyler_870603 => complex_protein_RNAase_transcript_vioE_biocrnpyler_870603; r24_biocrnpyler_870603_k*transcript_vioE_biocrnpyler_870603*protein_RNAase_biocrnpyler_870603;
    r24_biocrnpyler_870603_k = 100;
  r24_1_biocrnpyler_870603: complex_protein_RNAase_transcript_vioE_biocrnpyler_870603 => transcript_vioE_biocrnpyler_870603 + protein_RNAase_biocrnpyler_870603; r24_1_biocrnpyler_870603_k*complex_protein_RNAase_transcript_vioE_biocrnpyler_870603;
    r24_1_biocrnpyler_870603_k = 10;
  r26_biocrnpyler_870603: complex_protein_RNAase_transcript_vioE_biocrnpyler_870603 => protein_RNAase_biocrnpyler_870603; r26_biocrnpyler_870603_k*complex_protein_RNAase_transcript_vioE_biocrnpyler_870603;
    r26_biocrnpyler_870603_k = 0.001;
  r27_biocrnpyler_870603: dna_dna_vioD_biocrnpyler_870603 + protein_RNAP_biocrnpyler_870603 => complex_dna_dna_vioD_protein_RNAP_biocrnpyler_870603; r27_biocrnpyler_870603_k*dna_dna_vioD_biocrnpyler_870603*protein_RNAP_biocrnpyler_870603;
    r27_biocrnpyler_870603_k = 100;
  r27_1_biocrnpyler_870603: complex_dna_dna_vioD_protein_RNAP_biocrnpyler_870603 => dna_dna_vioD_biocrnpyler_870603 + protein_RNAP_biocrnpyler_870603; r27_1_biocrnpyler_870603_k*complex_dna_dna_vioD_protein_RNAP_biocrnpyler_870603;
    r27_1_biocrnpyler_870603_k = 10;
  r29_biocrnpyler_870603: complex_dna_dna_vioD_protein_RNAP_biocrnpyler_870603 => dna_dna_vioD_biocrnpyler_870603 + transcript_vioD_biocrnpyler_870603 + protein_RNAP_biocrnpyler_870603; r29_biocrnpyler_870603_k*complex_dna_dna_vioD_protein_RNAP_biocrnpyler_870603;
    r29_biocrnpyler_870603_k = 0.05;
  r30_biocrnpyler_870603: transcript_vioD_biocrnpyler_870603 + protein_Ribo_biocrnpyler_870603 => complex_protein_Ribo_transcript_vioD_biocrnpyler_870603; r30_biocrnpyler_870603_k*transcript_vioD_biocrnpyler_870603*protein_Ribo_biocrnpyler_870603;
    r30_biocrnpyler_870603_k = 100;
  r30_1_biocrnpyler_870603: complex_protein_Ribo_transcript_vioD_biocrnpyler_870603 => transcript_vioD_biocrnpyler_870603 + protein_Ribo_biocrnpyler_870603; r30_1_biocrnpyler_870603_k*complex_protein_Ribo_transcript_vioD_biocrnpyler_870603;
    r30_1_biocrnpyler_870603_k = 10;
  r32_biocrnpyler_870603: complex_protein_Ribo_transcript_vioD_biocrnpyler_870603 => transcript_vioD_biocrnpyler_870603 + enzyme_VioD_biocrnpyler_870603 + protein_Ribo_biocrnpyler_870603; r32_biocrnpyler_870603_k*complex_protein_Ribo_transcript_vioD_biocrnpyler_870603;
    r32_biocrnpyler_870603_k = 0.05;
  r33_biocrnpyler_870603: transcript_vioD_biocrnpyler_870603 + protein_RNAase_biocrnpyler_870603 => complex_protein_RNAase_transcript_vioD_biocrnpyler_870603; r33_biocrnpyler_870603_k*transcript_vioD_biocrnpyler_870603*protein_RNAase_biocrnpyler_870603;
    r33_biocrnpyler_870603_k = 100;
  r33_1_biocrnpyler_870603: complex_protein_RNAase_transcript_vioD_biocrnpyler_870603 => transcript_vioD_biocrnpyler_870603 + protein_RNAase_biocrnpyler_870603; r33_1_biocrnpyler_870603_k*complex_protein_RNAase_transcript_vioD_biocrnpyler_870603;
    r33_1_biocrnpyler_870603_k = 10;
  r35_biocrnpyler_870603: complex_protein_RNAase_transcript_vioD_biocrnpyler_870603 => protein_RNAase_biocrnpyler_870603; r35_biocrnpyler_870603_k*complex_protein_RNAase_transcript_vioD_biocrnpyler_870603;
    r35_biocrnpyler_870603_k = 0.001;
  r36_biocrnpyler_870603: TRP_biocrnpyler_870603 + enzyme_VioA_biocrnpyler_870603 => complex_TRP_enzyme_VioA_biocrnpyler_870603; r36_biocrnpyler_870603_k*TRP_biocrnpyler_870603*enzyme_VioA_biocrnpyler_870603;
    r36_biocrnpyler_870603_k = 10;
  r36_1_biocrnpyler_870603: complex_TRP_enzyme_VioA_biocrnpyler_870603 => TRP_biocrnpyler_870603 + enzyme_VioA_biocrnpyler_870603; r36_1_biocrnpyler_870603_k*complex_TRP_enzyme_VioA_biocrnpyler_870603;
    r36_1_biocrnpyler_870603_k = 1;
  r38_biocrnpyler_870603: complex_TRP_enzyme_VioA_biocrnpyler_870603 => IPA_imine_biocrnpyler_870603 + enzyme_VioA_biocrnpyler_870603; r38_biocrnpyler_870603_k*complex_TRP_enzyme_VioA_biocrnpyler_870603;
    r38_biocrnpyler_870603_k = 203;
  r39_biocrnpyler_870603: 2 IPA_imine_biocrnpyler_870603 + enzyme_VioB_biocrnpyler_870603 => complex_2x_IPA_imine_enzyme_VioB_biocrnpyler_870603; r39_biocrnpyler_870603_k*IPA_imine_biocrnpyler_870603^2*enzyme_VioB_biocrnpyler_870603;
    r39_biocrnpyler_870603_k = 10;
  r39_1_biocrnpyler_870603: complex_2x_IPA_imine_enzyme_VioB_biocrnpyler_870603 => 2 IPA_imine_biocrnpyler_870603 + enzyme_VioB_biocrnpyler_870603; r39_1_biocrnpyler_870603_k*complex_2x_IPA_imine_enzyme_VioB_biocrnpyler_870603;
    r39_1_biocrnpyler_870603_k = 1;
  r41_biocrnpyler_870603: complex_2x_IPA_imine_enzyme_VioB_biocrnpyler_870603 => IPA_imine_dimer_biocrnpyler_870603 + enzyme_VioB_biocrnpyler_870603; r41_biocrnpyler_870603_k*complex_2x_IPA_imine_enzyme_VioB_biocrnpyler_870603;
    r41_biocrnpyler_870603_k = 4500;
  r42_biocrnpyler_870603: IPA_imine_dimer_biocrnpyler_870603 + enzyme_VioE_biocrnpyler_870603 => complex_IPA_imine_dimer_enzyme_VioE_biocrnpyler_870603; r42_biocrnpyler_870603_k*IPA_imine_dimer_biocrnpyler_870603*enzyme_VioE_biocrnpyler_870603;
    r42_biocrnpyler_870603_k = 100;
  r42_1_biocrnpyler_870603: complex_IPA_imine_dimer_enzyme_VioE_biocrnpyler_870603 => IPA_imine_dimer_biocrnpyler_870603 + enzyme_VioE_biocrnpyler_870603; r42_1_biocrnpyler_870603_k*complex_IPA_imine_dimer_enzyme_VioE_biocrnpyler_870603;
    r42_1_biocrnpyler_870603_k = 10;
  r44_biocrnpyler_870603: complex_IPA_imine_dimer_enzyme_VioE_biocrnpyler_870603 => PTDVA_2_combined + enzyme_VioE_biocrnpyler_870603; r44_biocrnpyler_870603_k*complex_IPA_imine_dimer_enzyme_VioE_biocrnpyler_870603;
    r44_biocrnpyler_870603_k = 100;
  r45_biocrnpyler_870603: PTDVA_2_combined + enzyme_VioD_biocrnpyler_870603 => complex_PTDVA_enzyme_VioD_biocrnpyler_870603; r45_biocrnpyler_870603_k*PTDVA_2_combined*enzyme_VioD_biocrnpyler_870603;
    r45_biocrnpyler_870603_k = 100;
  r45_1_biocrnpyler_870603: complex_PTDVA_enzyme_VioD_biocrnpyler_870603 => PTDVA_2_combined + enzyme_VioD_biocrnpyler_870603; r45_1_biocrnpyler_870603_k*complex_PTDVA_enzyme_VioD_biocrnpyler_870603;
    r45_1_biocrnpyler_870603_k = 10;
  r47_biocrnpyler_870603: complex_PTDVA_enzyme_VioD_biocrnpyler_870603 => PTVA_2_combined + enzyme_VioD_biocrnpyler_870603; r47_biocrnpyler_870603_k*complex_PTDVA_enzyme_VioD_biocrnpyler_870603;
    r47_biocrnpyler_870603_k = 100;

  // Unit definitions:
  unit square_metre = metre^2;
  unit per_second = 1 / second;
  unit substance = dimensionless;
end
