// SBML level 3 version 2

model combined_model_of__combined_model_of__external_environment_model_combined_model_of__ahl_membrane_combined_model_of__biocrnpyler_243830()
  // model units - substance: mole, time: second, volume: litre, area: square_metre, length: metre, extent: mole

  // Compartments:
  compartment liposome_2_external_combined = 5e-6 litre;
  compartment liposome_2_internal_combined = 4e-6 litre;

  // Species:
  species PTVA_external_environment_model_1_combined in liposome_2_external_combined = 0;
  species PTDVA_external_environment_model_1_combined in liposome_2_external_combined = 0;
  species complex_dna_dna_vioC_protein_RNAP_biocrnpyler_243830 in liposome_2_internal_combined = 0;
  species protein_RNAase_biocrnpyler_243830 in liposome_2_internal_combined = 6;
  species dna_dna_vioC_biocrnpyler_243830 in liposome_2_internal_combined = 0;
  species complex_protein_RNAase_transcript_vioC_biocrnpyler_243830 in liposome_2_internal_combined = 0;
  species enzyme_VioC_biocrnpyler_243830 in liposome_2_internal_combined = 0;
  species protein_Ribo_biocrnpyler_243830 in liposome_2_internal_combined = 24;
  species complex_protein_Ribo_transcript_vioC_biocrnpyler_243830 in liposome_2_internal_combined = 0;
  species transcript_vioC_biocrnpyler_243830 in liposome_2_internal_combined = 0;
  species protein_RNAP_biocrnpyler_243830 in liposome_2_internal_combined = 3;
  species PTVA_2_combined in liposome_2_internal_combined = 0;
  species V_biocrnpyler_243830 in liposome_2_internal_combined = 0;
  species complex_PTVA_enzyme_VioC_biocrnpyler_243830 in liposome_2_internal_combined = 0;
  species PTDVA_2_combined in liposome_2_internal_combined = 0;
  species DV_biocrnpyler_243830 in liposome_2_internal_combined = 0;
  species complex_PTDVA_enzyme_VioC_biocrnpyler_243830 in liposome_2_internal_combined = 0;

  // Parameters:
  kb = 2 per_second;
  kd = 10 per_second;

  // Reactions:
  r3: PTVA_2_combined -> PTVA_external_environment_model_1_combined; kb*PTVA_2_combined - kd*PTVA_external_environment_model_1_combined;
  r0_biocrnpyler_243830: dna_dna_vioC_biocrnpyler_243830 + protein_RNAP_biocrnpyler_243830 => complex_dna_dna_vioC_protein_RNAP_biocrnpyler_243830; r0_biocrnpyler_243830_k*dna_dna_vioC_biocrnpyler_243830*protein_RNAP_biocrnpyler_243830;
    r0_biocrnpyler_243830_k = 100;
  r0_1_biocrnpyler_243830: complex_dna_dna_vioC_protein_RNAP_biocrnpyler_243830 => dna_dna_vioC_biocrnpyler_243830 + protein_RNAP_biocrnpyler_243830; r0_1_biocrnpyler_243830_k*complex_dna_dna_vioC_protein_RNAP_biocrnpyler_243830;
    r0_1_biocrnpyler_243830_k = 10;
  r2_biocrnpyler_243830: complex_dna_dna_vioC_protein_RNAP_biocrnpyler_243830 => dna_dna_vioC_biocrnpyler_243830 + transcript_vioC_biocrnpyler_243830 + protein_RNAP_biocrnpyler_243830; r2_biocrnpyler_243830_k*complex_dna_dna_vioC_protein_RNAP_biocrnpyler_243830;
    r2_biocrnpyler_243830_k = 0.05;
  r3_biocrnpyler_243830: transcript_vioC_biocrnpyler_243830 + protein_Ribo_biocrnpyler_243830 => complex_protein_Ribo_transcript_vioC_biocrnpyler_243830; r3_biocrnpyler_243830_k*transcript_vioC_biocrnpyler_243830*protein_Ribo_biocrnpyler_243830;
    r3_biocrnpyler_243830_k = 100;
  r3_1_biocrnpyler_243830: complex_protein_Ribo_transcript_vioC_biocrnpyler_243830 => transcript_vioC_biocrnpyler_243830 + protein_Ribo_biocrnpyler_243830; r3_1_biocrnpyler_243830_k*complex_protein_Ribo_transcript_vioC_biocrnpyler_243830;
    r3_1_biocrnpyler_243830_k = 10;
  r5_biocrnpyler_243830: complex_protein_Ribo_transcript_vioC_biocrnpyler_243830 => transcript_vioC_biocrnpyler_243830 + enzyme_VioC_biocrnpyler_243830 + protein_Ribo_biocrnpyler_243830; r5_biocrnpyler_243830_k*complex_protein_Ribo_transcript_vioC_biocrnpyler_243830;
    r5_biocrnpyler_243830_k = 0.05;
  r6_biocrnpyler_243830: transcript_vioC_biocrnpyler_243830 + protein_RNAase_biocrnpyler_243830 => complex_protein_RNAase_transcript_vioC_biocrnpyler_243830; r6_biocrnpyler_243830_k*transcript_vioC_biocrnpyler_243830*protein_RNAase_biocrnpyler_243830;
    r6_biocrnpyler_243830_k = 100;
  r6_1_biocrnpyler_243830: complex_protein_RNAase_transcript_vioC_biocrnpyler_243830 => transcript_vioC_biocrnpyler_243830 + protein_RNAase_biocrnpyler_243830; r6_1_biocrnpyler_243830_k*complex_protein_RNAase_transcript_vioC_biocrnpyler_243830;
    r6_1_biocrnpyler_243830_k = 10;
  r8_biocrnpyler_243830: complex_protein_RNAase_transcript_vioC_biocrnpyler_243830 => protein_RNAase_biocrnpyler_243830; r8_biocrnpyler_243830_k*complex_protein_RNAase_transcript_vioC_biocrnpyler_243830;
    r8_biocrnpyler_243830_k = 0.001;
  r9_biocrnpyler_243830: PTVA_2_combined + enzyme_VioC_biocrnpyler_243830 => complex_PTVA_enzyme_VioC_biocrnpyler_243830; r9_biocrnpyler_243830_k*PTVA_2_combined*enzyme_VioC_biocrnpyler_243830;
    r9_biocrnpyler_243830_k = 100;
  r9_1_biocrnpyler_243830: complex_PTVA_enzyme_VioC_biocrnpyler_243830 => PTVA_2_combined + enzyme_VioC_biocrnpyler_243830; r9_1_biocrnpyler_243830_k*complex_PTVA_enzyme_VioC_biocrnpyler_243830;
    r9_1_biocrnpyler_243830_k = 10;
  r11_biocrnpyler_243830: complex_PTVA_enzyme_VioC_biocrnpyler_243830 => V_biocrnpyler_243830 + enzyme_VioC_biocrnpyler_243830; r11_biocrnpyler_243830_k*complex_PTVA_enzyme_VioC_biocrnpyler_243830;
    r11_biocrnpyler_243830_k = 100;
  r12_biocrnpyler_243830: PTDVA_2_combined + enzyme_VioC_biocrnpyler_243830 => complex_PTDVA_enzyme_VioC_biocrnpyler_243830; r12_biocrnpyler_243830_k*PTDVA_2_combined*enzyme_VioC_biocrnpyler_243830;
    r12_biocrnpyler_243830_k = 100;
  r12_1_biocrnpyler_243830: complex_PTDVA_enzyme_VioC_biocrnpyler_243830 => PTDVA_2_combined + enzyme_VioC_biocrnpyler_243830; r12_1_biocrnpyler_243830_k*complex_PTDVA_enzyme_VioC_biocrnpyler_243830;
    r12_1_biocrnpyler_243830_k = 10;
  r14_biocrnpyler_243830: complex_PTDVA_enzyme_VioC_biocrnpyler_243830 => DV_biocrnpyler_243830 + enzyme_VioC_biocrnpyler_243830; r14_biocrnpyler_243830_k*complex_PTDVA_enzyme_VioC_biocrnpyler_243830;
    r14_biocrnpyler_243830_k = 100;

  // Unit definitions:
  unit square_metre = metre^2;
  unit per_second = 1 / second;
  unit substance = dimensionless;
end
