// SBML level 3 version 2

model combined_model_of__combined_model_of__combined_model_of__external_environment_model_combined_model_of__ahl_membrane_combined_model_of__biocrnpyler_776499_combined_model_of__combined_model_of__external_environment_model_combined_model_of__ahl_membrane_combined_model_of__biocrnpyler_392656()
  // model units - substance: mole, time: second, volume: litre, area: square_metre, length: metre, extent: mole

  // Compartments:
  compartment actual_external_compartment_combined = 9e-6 litre;
  compartment liposome_1_internal_combined = 3e-6 litre;
  compartment liposome_2_internal_combined = 4e-6 litre;

  // Species:
  species complex_protein_RNAase_transcript_vioA_biocrnpyler_776499 in liposome_1_internal_combined = 0;
  species transcript_vioA_biocrnpyler_776499 in liposome_1_internal_combined = 0;
  species enzyme_VioA_biocrnpyler_776499 in liposome_1_internal_combined = 0;
  species protein_RNAP_biocrnpyler_776499 in liposome_1_internal_combined = 3;
  species complex_protein_Ribo_transcript_vioA_biocrnpyler_776499 in liposome_1_internal_combined = 0;
  species protein_RNAase_biocrnpyler_776499 in liposome_1_internal_combined = 6;
  species complex_dna_dna_vioA_protein_RNAP_biocrnpyler_776499 in liposome_1_internal_combined = 0;
  species protein_Ribo_biocrnpyler_776499 in liposome_1_internal_combined = 24;
  species dna_dna_vioA_biocrnpyler_776499 in liposome_1_internal_combined = 10/liposome_1_internal_combined;
  species complex_protein_Ribo_transcript_vioB_biocrnpyler_776499 in liposome_1_internal_combined = 0;
  species complex_protein_RNAase_transcript_vioB_biocrnpyler_776499 in liposome_1_internal_combined = 0;
  species transcript_vioB_biocrnpyler_776499 in liposome_1_internal_combined = 0;
  species enzyme_VioB_biocrnpyler_776499 in liposome_1_internal_combined = 0;
  species complex_dna_dna_vioB_protein_RNAP_biocrnpyler_776499 in liposome_1_internal_combined = 0;
  species dna_dna_vioB_biocrnpyler_776499 in liposome_1_internal_combined = 10/liposome_1_internal_combined;
  species complex_protein_Ribo_transcript_vioE_biocrnpyler_776499 in liposome_1_internal_combined = 0;
  species dna_dna_vioE_biocrnpyler_776499 in liposome_1_internal_combined = 10/liposome_1_internal_combined;
  species transcript_vioE_biocrnpyler_776499 in liposome_1_internal_combined = 0;
  species complex_dna_dna_vioE_protein_RNAP_biocrnpyler_776499 in liposome_1_internal_combined = 0;
  species enzyme_VioE_biocrnpyler_776499 in liposome_1_internal_combined = 0;
  species complex_protein_RNAase_transcript_vioE_biocrnpyler_776499 in liposome_1_internal_combined = 0;
  species transcript_vioD_biocrnpyler_776499 in liposome_1_internal_combined = 0;
  species dna_dna_vioD_biocrnpyler_776499 in liposome_1_internal_combined = 10/liposome_1_internal_combined;
  species complex_protein_Ribo_transcript_vioD_biocrnpyler_776499 in liposome_1_internal_combined = 0;
  species enzyme_VioD_biocrnpyler_776499 in liposome_1_internal_combined = 0;
  species complex_dna_dna_vioD_protein_RNAP_biocrnpyler_776499 in liposome_1_internal_combined = 0;
  species complex_protein_RNAase_transcript_vioD_biocrnpyler_776499 in liposome_1_internal_combined = 0;
  species TRP_biocrnpyler_776499 in liposome_1_internal_combined = 10/liposome_1_internal_combined;
  species IPA_imine_biocrnpyler_776499 in liposome_1_internal_combined = 0;
  species complex_TRP_enzyme_VioA_biocrnpyler_776499 in liposome_1_internal_combined = 0;
  species IPA_imine_dimer_biocrnpyler_776499 in liposome_1_internal_combined = 0;
  species complex_2x_IPA_imine_enzyme_VioB_biocrnpyler_776499 in liposome_1_internal_combined = 0;
  species PTDVA_2_combined in liposome_1_internal_combined = 0;
  species complex_IPA_imine_dimer_enzyme_VioE_biocrnpyler_776499 in liposome_1_internal_combined = 0;
  species PTVA_2_combined in liposome_1_internal_combined = 0;
  species complex_PTDVA_enzyme_VioD_biocrnpyler_776499 in liposome_1_internal_combined = 0;
  species enzyme_VioC_biocrnpyler_392656 in liposome_2_internal_combined = 0;
  species protein_RNAP_biocrnpyler_392656 in liposome_2_internal_combined = 3;
  species protein_RNAase_biocrnpyler_392656 in liposome_2_internal_combined = 6;
  species transcript_vioC_biocrnpyler_392656 in liposome_2_internal_combined = 0;
  species protein_Ribo_biocrnpyler_392656 in liposome_2_internal_combined = 24;
  species complex_protein_RNAase_transcript_vioC_biocrnpyler_392656 in liposome_2_internal_combined = 0;
  species complex_protein_Ribo_transcript_vioC_biocrnpyler_392656 in liposome_2_internal_combined = 0;
  species complex_dna_dna_vioC_protein_RNAP_biocrnpyler_392656 in liposome_2_internal_combined = 0;
  species dna_dna_vioC_biocrnpyler_392656 in liposome_2_internal_combined = 10/liposome_2_internal_combined;
  species PTVA_1_1_combined in liposome_2_internal_combined = 0;
  species V_biocrnpyler_392656 in liposome_2_internal_combined = 0;
  species complex_PTVA_enzyme_VioC_biocrnpyler_392656 in liposome_2_internal_combined = 0;
  species PTDVA_1_1_combined in liposome_2_internal_combined = 0;
  species DV_biocrnpyler_392656 in liposome_2_internal_combined = 0;
  species complex_PTDVA_enzyme_VioC_biocrnpyler_392656 in liposome_2_internal_combined = 0;
  species PTVA_external_environment_model_1_combined_1_combined in actual_external_compartment = 0;
  species PTDVA_external_environment_model_1_combined_1_combined in actual_external_compartment = 0;

  // Parameters:
  kb_combined = 10 per_second;
  kd_combined = 2 per_second;
  kb = 2 per_second;
  kd = 10 per_second;

  // Reactions:
  r1: PTVA_2_combined => PTVA_external_environment_model_1_combined_1_combined; kb_combined*PTVA_2_combined - kd_combined*PTVA_external_environment_model_1_combined_1_combined;
  r2_combined: PTDVA_2_combined -> PTDVA_external_environment_model_1_combined_1_combined; kb_combined*PTDVA_2_combined - kd_combined*PTDVA_external_environment_model_1_combined_1_combined;
  r0_biocrnpyler_776499: dna_dna_vioA_biocrnpyler_776499 + protein_RNAP_biocrnpyler_776499 => complex_dna_dna_vioA_protein_RNAP_biocrnpyler_776499; r0_biocrnpyler_776499_k*dna_dna_vioA_biocrnpyler_776499*protein_RNAP_biocrnpyler_776499;
    r0_biocrnpyler_776499_k = 100;
  r0_1_biocrnpyler_776499: complex_dna_dna_vioA_protein_RNAP_biocrnpyler_776499 => dna_dna_vioA_biocrnpyler_776499 + protein_RNAP_biocrnpyler_776499; r0_1_biocrnpyler_776499_k*complex_dna_dna_vioA_protein_RNAP_biocrnpyler_776499;
    r0_1_biocrnpyler_776499_k = 10;
  r2_biocrnpyler_776499: complex_dna_dna_vioA_protein_RNAP_biocrnpyler_776499 => dna_dna_vioA_biocrnpyler_776499 + transcript_vioA_biocrnpyler_776499 + protein_RNAP_biocrnpyler_776499; r2_biocrnpyler_776499_k*complex_dna_dna_vioA_protein_RNAP_biocrnpyler_776499;
    r2_biocrnpyler_776499_k = 0.05;
  r3_biocrnpyler_776499: transcript_vioA_biocrnpyler_776499 + protein_Ribo_biocrnpyler_776499 => complex_protein_Ribo_transcript_vioA_biocrnpyler_776499; r3_biocrnpyler_776499_k*transcript_vioA_biocrnpyler_776499*protein_Ribo_biocrnpyler_776499;
    r3_biocrnpyler_776499_k = 100;
  r3_1_biocrnpyler_776499: complex_protein_Ribo_transcript_vioA_biocrnpyler_776499 => transcript_vioA_biocrnpyler_776499 + protein_Ribo_biocrnpyler_776499; r3_1_biocrnpyler_776499_k*complex_protein_Ribo_transcript_vioA_biocrnpyler_776499;
    r3_1_biocrnpyler_776499_k = 10;
  r5_biocrnpyler_776499: complex_protein_Ribo_transcript_vioA_biocrnpyler_776499 => transcript_vioA_biocrnpyler_776499 + enzyme_VioA_biocrnpyler_776499 + protein_Ribo_biocrnpyler_776499; r5_biocrnpyler_776499_k*complex_protein_Ribo_transcript_vioA_biocrnpyler_776499;
    r5_biocrnpyler_776499_k = 0.05;
  r6_biocrnpyler_776499: transcript_vioA_biocrnpyler_776499 + protein_RNAase_biocrnpyler_776499 => complex_protein_RNAase_transcript_vioA_biocrnpyler_776499; r6_biocrnpyler_776499_k*transcript_vioA_biocrnpyler_776499*protein_RNAase_biocrnpyler_776499;
    r6_biocrnpyler_776499_k = 100;
  r6_1_biocrnpyler_776499: complex_protein_RNAase_transcript_vioA_biocrnpyler_776499 => transcript_vioA_biocrnpyler_776499 + protein_RNAase_biocrnpyler_776499; r6_1_biocrnpyler_776499_k*complex_protein_RNAase_transcript_vioA_biocrnpyler_776499;
    r6_1_biocrnpyler_776499_k = 10;
  r8_biocrnpyler_776499: complex_protein_RNAase_transcript_vioA_biocrnpyler_776499 => protein_RNAase_biocrnpyler_776499; r8_biocrnpyler_776499_k*complex_protein_RNAase_transcript_vioA_biocrnpyler_776499;
    r8_biocrnpyler_776499_k = 0.001;
  r9_biocrnpyler_776499: dna_dna_vioB_biocrnpyler_776499 + protein_RNAP_biocrnpyler_776499 => complex_dna_dna_vioB_protein_RNAP_biocrnpyler_776499; r9_biocrnpyler_776499_k*dna_dna_vioB_biocrnpyler_776499*protein_RNAP_biocrnpyler_776499;
    r9_biocrnpyler_776499_k = 100;
  r9_1_biocrnpyler_776499: complex_dna_dna_vioB_protein_RNAP_biocrnpyler_776499 => dna_dna_vioB_biocrnpyler_776499 + protein_RNAP_biocrnpyler_776499; r9_1_biocrnpyler_776499_k*complex_dna_dna_vioB_protein_RNAP_biocrnpyler_776499;
    r9_1_biocrnpyler_776499_k = 10;
  r11_biocrnpyler_776499: complex_dna_dna_vioB_protein_RNAP_biocrnpyler_776499 => dna_dna_vioB_biocrnpyler_776499 + transcript_vioB_biocrnpyler_776499 + protein_RNAP_biocrnpyler_776499; r11_biocrnpyler_776499_k*complex_dna_dna_vioB_protein_RNAP_biocrnpyler_776499;
    r11_biocrnpyler_776499_k = 0.05;
  r12_biocrnpyler_776499: transcript_vioB_biocrnpyler_776499 + protein_Ribo_biocrnpyler_776499 => complex_protein_Ribo_transcript_vioB_biocrnpyler_776499; r12_biocrnpyler_776499_k*transcript_vioB_biocrnpyler_776499*protein_Ribo_biocrnpyler_776499;
    r12_biocrnpyler_776499_k = 100;
  r12_1_biocrnpyler_776499: complex_protein_Ribo_transcript_vioB_biocrnpyler_776499 => transcript_vioB_biocrnpyler_776499 + protein_Ribo_biocrnpyler_776499; r12_1_biocrnpyler_776499_k*complex_protein_Ribo_transcript_vioB_biocrnpyler_776499;
    r12_1_biocrnpyler_776499_k = 10;
  r14_biocrnpyler_776499: complex_protein_Ribo_transcript_vioB_biocrnpyler_776499 => transcript_vioB_biocrnpyler_776499 + enzyme_VioB_biocrnpyler_776499 + protein_Ribo_biocrnpyler_776499; r14_biocrnpyler_776499_k*complex_protein_Ribo_transcript_vioB_biocrnpyler_776499;
    r14_biocrnpyler_776499_k = 0.05;
  r15_biocrnpyler_776499: transcript_vioB_biocrnpyler_776499 + protein_RNAase_biocrnpyler_776499 => complex_protein_RNAase_transcript_vioB_biocrnpyler_776499; r15_biocrnpyler_776499_k*transcript_vioB_biocrnpyler_776499*protein_RNAase_biocrnpyler_776499;
    r15_biocrnpyler_776499_k = 100;
  r15_1_biocrnpyler_776499: complex_protein_RNAase_transcript_vioB_biocrnpyler_776499 => transcript_vioB_biocrnpyler_776499 + protein_RNAase_biocrnpyler_776499; r15_1_biocrnpyler_776499_k*complex_protein_RNAase_transcript_vioB_biocrnpyler_776499;
    r15_1_biocrnpyler_776499_k = 10;
  r17_biocrnpyler_776499: complex_protein_RNAase_transcript_vioB_biocrnpyler_776499 => protein_RNAase_biocrnpyler_776499; r17_biocrnpyler_776499_k*complex_protein_RNAase_transcript_vioB_biocrnpyler_776499;
    r17_biocrnpyler_776499_k = 0.001;
  r18_biocrnpyler_776499: dna_dna_vioE_biocrnpyler_776499 + protein_RNAP_biocrnpyler_776499 => complex_dna_dna_vioE_protein_RNAP_biocrnpyler_776499; r18_biocrnpyler_776499_k*dna_dna_vioE_biocrnpyler_776499*protein_RNAP_biocrnpyler_776499;
    r18_biocrnpyler_776499_k = 100;
  r18_1_biocrnpyler_776499: complex_dna_dna_vioE_protein_RNAP_biocrnpyler_776499 => dna_dna_vioE_biocrnpyler_776499 + protein_RNAP_biocrnpyler_776499; r18_1_biocrnpyler_776499_k*complex_dna_dna_vioE_protein_RNAP_biocrnpyler_776499;
    r18_1_biocrnpyler_776499_k = 10;
  r20_biocrnpyler_776499: complex_dna_dna_vioE_protein_RNAP_biocrnpyler_776499 => dna_dna_vioE_biocrnpyler_776499 + transcript_vioE_biocrnpyler_776499 + protein_RNAP_biocrnpyler_776499; r20_biocrnpyler_776499_k*complex_dna_dna_vioE_protein_RNAP_biocrnpyler_776499;
    r20_biocrnpyler_776499_k = 0.05;
  r21_biocrnpyler_776499: transcript_vioE_biocrnpyler_776499 + protein_Ribo_biocrnpyler_776499 => complex_protein_Ribo_transcript_vioE_biocrnpyler_776499; r21_biocrnpyler_776499_k*transcript_vioE_biocrnpyler_776499*protein_Ribo_biocrnpyler_776499;
    r21_biocrnpyler_776499_k = 100;
  r21_1_biocrnpyler_776499: complex_protein_Ribo_transcript_vioE_biocrnpyler_776499 => transcript_vioE_biocrnpyler_776499 + protein_Ribo_biocrnpyler_776499; r21_1_biocrnpyler_776499_k*complex_protein_Ribo_transcript_vioE_biocrnpyler_776499;
    r21_1_biocrnpyler_776499_k = 10;
  r23_biocrnpyler_776499: complex_protein_Ribo_transcript_vioE_biocrnpyler_776499 => transcript_vioE_biocrnpyler_776499 + enzyme_VioE_biocrnpyler_776499 + protein_Ribo_biocrnpyler_776499; r23_biocrnpyler_776499_k*complex_protein_Ribo_transcript_vioE_biocrnpyler_776499;
    r23_biocrnpyler_776499_k = 0.05;
  r24_biocrnpyler_776499: transcript_vioE_biocrnpyler_776499 + protein_RNAase_biocrnpyler_776499 => complex_protein_RNAase_transcript_vioE_biocrnpyler_776499; r24_biocrnpyler_776499_k*transcript_vioE_biocrnpyler_776499*protein_RNAase_biocrnpyler_776499;
    r24_biocrnpyler_776499_k = 100;
  r24_1_biocrnpyler_776499: complex_protein_RNAase_transcript_vioE_biocrnpyler_776499 => transcript_vioE_biocrnpyler_776499 + protein_RNAase_biocrnpyler_776499; r24_1_biocrnpyler_776499_k*complex_protein_RNAase_transcript_vioE_biocrnpyler_776499;
    r24_1_biocrnpyler_776499_k = 10;
  r26_biocrnpyler_776499: complex_protein_RNAase_transcript_vioE_biocrnpyler_776499 => protein_RNAase_biocrnpyler_776499; r26_biocrnpyler_776499_k*complex_protein_RNAase_transcript_vioE_biocrnpyler_776499;
    r26_biocrnpyler_776499_k = 0.001;
  r27_biocrnpyler_776499: dna_dna_vioD_biocrnpyler_776499 + protein_RNAP_biocrnpyler_776499 => complex_dna_dna_vioD_protein_RNAP_biocrnpyler_776499; r27_biocrnpyler_776499_k*dna_dna_vioD_biocrnpyler_776499*protein_RNAP_biocrnpyler_776499;
    r27_biocrnpyler_776499_k = 100;
  r27_1_biocrnpyler_776499: complex_dna_dna_vioD_protein_RNAP_biocrnpyler_776499 => dna_dna_vioD_biocrnpyler_776499 + protein_RNAP_biocrnpyler_776499; r27_1_biocrnpyler_776499_k*complex_dna_dna_vioD_protein_RNAP_biocrnpyler_776499;
    r27_1_biocrnpyler_776499_k = 10;
  r29_biocrnpyler_776499: complex_dna_dna_vioD_protein_RNAP_biocrnpyler_776499 => dna_dna_vioD_biocrnpyler_776499 + transcript_vioD_biocrnpyler_776499 + protein_RNAP_biocrnpyler_776499; r29_biocrnpyler_776499_k*complex_dna_dna_vioD_protein_RNAP_biocrnpyler_776499;
    r29_biocrnpyler_776499_k = 0.05;
  r30_biocrnpyler_776499: transcript_vioD_biocrnpyler_776499 + protein_Ribo_biocrnpyler_776499 => complex_protein_Ribo_transcript_vioD_biocrnpyler_776499; r30_biocrnpyler_776499_k*transcript_vioD_biocrnpyler_776499*protein_Ribo_biocrnpyler_776499;
    r30_biocrnpyler_776499_k = 100;
  r30_1_biocrnpyler_776499: complex_protein_Ribo_transcript_vioD_biocrnpyler_776499 => transcript_vioD_biocrnpyler_776499 + protein_Ribo_biocrnpyler_776499; r30_1_biocrnpyler_776499_k*complex_protein_Ribo_transcript_vioD_biocrnpyler_776499;
    r30_1_biocrnpyler_776499_k = 10;
  r32_biocrnpyler_776499: complex_protein_Ribo_transcript_vioD_biocrnpyler_776499 => transcript_vioD_biocrnpyler_776499 + enzyme_VioD_biocrnpyler_776499 + protein_Ribo_biocrnpyler_776499; r32_biocrnpyler_776499_k*complex_protein_Ribo_transcript_vioD_biocrnpyler_776499;
    r32_biocrnpyler_776499_k = 0.05;
  r33_biocrnpyler_776499: transcript_vioD_biocrnpyler_776499 + protein_RNAase_biocrnpyler_776499 => complex_protein_RNAase_transcript_vioD_biocrnpyler_776499; r33_biocrnpyler_776499_k*transcript_vioD_biocrnpyler_776499*protein_RNAase_biocrnpyler_776499;
    r33_biocrnpyler_776499_k = 100;
  r33_1_biocrnpyler_776499: complex_protein_RNAase_transcript_vioD_biocrnpyler_776499 => transcript_vioD_biocrnpyler_776499 + protein_RNAase_biocrnpyler_776499; r33_1_biocrnpyler_776499_k*complex_protein_RNAase_transcript_vioD_biocrnpyler_776499;
    r33_1_biocrnpyler_776499_k = 10;
  r35_biocrnpyler_776499: complex_protein_RNAase_transcript_vioD_biocrnpyler_776499 => protein_RNAase_biocrnpyler_776499; r35_biocrnpyler_776499_k*complex_protein_RNAase_transcript_vioD_biocrnpyler_776499;
    r35_biocrnpyler_776499_k = 0.001;
  r36_biocrnpyler_776499: TRP_biocrnpyler_776499 + enzyme_VioA_biocrnpyler_776499 => complex_TRP_enzyme_VioA_biocrnpyler_776499; r36_biocrnpyler_776499_k*TRP_biocrnpyler_776499*enzyme_VioA_biocrnpyler_776499;
    r36_biocrnpyler_776499_k = 10;
  r36_1_biocrnpyler_776499: complex_TRP_enzyme_VioA_biocrnpyler_776499 => TRP_biocrnpyler_776499 + enzyme_VioA_biocrnpyler_776499; r36_1_biocrnpyler_776499_k*complex_TRP_enzyme_VioA_biocrnpyler_776499;
    r36_1_biocrnpyler_776499_k = 1;
  r38_biocrnpyler_776499: complex_TRP_enzyme_VioA_biocrnpyler_776499 => IPA_imine_biocrnpyler_776499 + enzyme_VioA_biocrnpyler_776499; r38_biocrnpyler_776499_k*complex_TRP_enzyme_VioA_biocrnpyler_776499;
    r38_biocrnpyler_776499_k = 203;
  r39_biocrnpyler_776499: 2 IPA_imine_biocrnpyler_776499 + enzyme_VioB_biocrnpyler_776499 => complex_2x_IPA_imine_enzyme_VioB_biocrnpyler_776499; r39_biocrnpyler_776499_k*IPA_imine_biocrnpyler_776499^2*enzyme_VioB_biocrnpyler_776499;
    r39_biocrnpyler_776499_k = 10;
  r39_1_biocrnpyler_776499: complex_2x_IPA_imine_enzyme_VioB_biocrnpyler_776499 => 2 IPA_imine_biocrnpyler_776499 + enzyme_VioB_biocrnpyler_776499; r39_1_biocrnpyler_776499_k*complex_2x_IPA_imine_enzyme_VioB_biocrnpyler_776499;
    r39_1_biocrnpyler_776499_k = 1;
  r41_biocrnpyler_776499: complex_2x_IPA_imine_enzyme_VioB_biocrnpyler_776499 => IPA_imine_dimer_biocrnpyler_776499 + enzyme_VioB_biocrnpyler_776499; r41_biocrnpyler_776499_k*complex_2x_IPA_imine_enzyme_VioB_biocrnpyler_776499;
    r41_biocrnpyler_776499_k = 4500;
  r42_biocrnpyler_776499: IPA_imine_dimer_biocrnpyler_776499 + enzyme_VioE_biocrnpyler_776499 => complex_IPA_imine_dimer_enzyme_VioE_biocrnpyler_776499; r42_biocrnpyler_776499_k*IPA_imine_dimer_biocrnpyler_776499*enzyme_VioE_biocrnpyler_776499;
    r42_biocrnpyler_776499_k = 100;
  r42_1_biocrnpyler_776499: complex_IPA_imine_dimer_enzyme_VioE_biocrnpyler_776499 => IPA_imine_dimer_biocrnpyler_776499 + enzyme_VioE_biocrnpyler_776499; r42_1_biocrnpyler_776499_k*complex_IPA_imine_dimer_enzyme_VioE_biocrnpyler_776499;
    r42_1_biocrnpyler_776499_k = 10;
  r44_biocrnpyler_776499: complex_IPA_imine_dimer_enzyme_VioE_biocrnpyler_776499 => PTDVA_2_combined + enzyme_VioE_biocrnpyler_776499; r44_biocrnpyler_776499_k*complex_IPA_imine_dimer_enzyme_VioE_biocrnpyler_776499;
    r44_biocrnpyler_776499_k = 100;
  r45_biocrnpyler_776499: PTDVA_2_combined + enzyme_VioD_biocrnpyler_776499 => complex_PTDVA_enzyme_VioD_biocrnpyler_776499; r45_biocrnpyler_776499_k*PTDVA_2_combined*enzyme_VioD_biocrnpyler_776499;
    r45_biocrnpyler_776499_k = 100;
  r45_1_biocrnpyler_776499: complex_PTDVA_enzyme_VioD_biocrnpyler_776499 => PTDVA_2_combined + enzyme_VioD_biocrnpyler_776499; r45_1_biocrnpyler_776499_k*complex_PTDVA_enzyme_VioD_biocrnpyler_776499;
    r45_1_biocrnpyler_776499_k = 10;
  r47_biocrnpyler_776499: complex_PTDVA_enzyme_VioD_biocrnpyler_776499 => PTVA_2_combined + enzyme_VioD_biocrnpyler_776499; r47_biocrnpyler_776499_k*complex_PTDVA_enzyme_VioD_biocrnpyler_776499;
    r47_biocrnpyler_776499_k = 100;
  r3: PTVA_external_environment_model_1_combined_1_combined -> PTVA_1_1_combined; kb_combined*PTVA_external_environment_model_1_combined_1_combined - kd_combined*PTVA_1_1_combined;
  r0_biocrnpyler_392656: dna_dna_vioC_biocrnpyler_392656 + protein_RNAP_biocrnpyler_392656 => complex_dna_dna_vioC_protein_RNAP_biocrnpyler_392656; r0_biocrnpyler_392656_k*dna_dna_vioC_biocrnpyler_392656*protein_RNAP_biocrnpyler_392656;
    r0_biocrnpyler_392656_k = 100;
  r0_1_biocrnpyler_392656: complex_dna_dna_vioC_protein_RNAP_biocrnpyler_392656 => dna_dna_vioC_biocrnpyler_392656 + protein_RNAP_biocrnpyler_392656; r0_1_biocrnpyler_392656_k*complex_dna_dna_vioC_protein_RNAP_biocrnpyler_392656;
    r0_1_biocrnpyler_392656_k = 10;
  r2_biocrnpyler_392656: complex_dna_dna_vioC_protein_RNAP_biocrnpyler_392656 => dna_dna_vioC_biocrnpyler_392656 + transcript_vioC_biocrnpyler_392656 + protein_RNAP_biocrnpyler_392656; r2_biocrnpyler_392656_k*complex_dna_dna_vioC_protein_RNAP_biocrnpyler_392656;
    r2_biocrnpyler_392656_k = 0.05;
  r3_biocrnpyler_392656: transcript_vioC_biocrnpyler_392656 + protein_Ribo_biocrnpyler_392656 => complex_protein_Ribo_transcript_vioC_biocrnpyler_392656; r3_biocrnpyler_392656_k*transcript_vioC_biocrnpyler_392656*protein_Ribo_biocrnpyler_392656;
    r3_biocrnpyler_392656_k = 100;
  r3_1_biocrnpyler_392656: complex_protein_Ribo_transcript_vioC_biocrnpyler_392656 => transcript_vioC_biocrnpyler_392656 + protein_Ribo_biocrnpyler_392656; r3_1_biocrnpyler_392656_k*complex_protein_Ribo_transcript_vioC_biocrnpyler_392656;
    r3_1_biocrnpyler_392656_k = 10;
  r5_biocrnpyler_392656: complex_protein_Ribo_transcript_vioC_biocrnpyler_392656 => transcript_vioC_biocrnpyler_392656 + enzyme_VioC_biocrnpyler_392656 + protein_Ribo_biocrnpyler_392656; r5_biocrnpyler_392656_k*complex_protein_Ribo_transcript_vioC_biocrnpyler_392656;
    r5_biocrnpyler_392656_k = 0.05;
  r6_biocrnpyler_392656: transcript_vioC_biocrnpyler_392656 + protein_RNAase_biocrnpyler_392656 => complex_protein_RNAase_transcript_vioC_biocrnpyler_392656; r6_biocrnpyler_392656_k*transcript_vioC_biocrnpyler_392656*protein_RNAase_biocrnpyler_392656;
    r6_biocrnpyler_392656_k = 100;
  r6_1_biocrnpyler_392656: complex_protein_RNAase_transcript_vioC_biocrnpyler_392656 => transcript_vioC_biocrnpyler_392656 + protein_RNAase_biocrnpyler_392656; r6_1_biocrnpyler_392656_k*complex_protein_RNAase_transcript_vioC_biocrnpyler_392656;
    r6_1_biocrnpyler_392656_k = 10;
  r8_biocrnpyler_392656: complex_protein_RNAase_transcript_vioC_biocrnpyler_392656 => protein_RNAase_biocrnpyler_392656; r8_biocrnpyler_392656_k*complex_protein_RNAase_transcript_vioC_biocrnpyler_392656;
    r8_biocrnpyler_392656_k = 0.001;
  r9_biocrnpyler_392656: PTVA_1_1_combined + enzyme_VioC_biocrnpyler_392656 => complex_PTVA_enzyme_VioC_biocrnpyler_392656; r9_biocrnpyler_392656_k*PTVA_1_1_combined*enzyme_VioC_biocrnpyler_392656;
    r9_biocrnpyler_392656_k = 100;
  r9_1_biocrnpyler_392656: complex_PTVA_enzyme_VioC_biocrnpyler_392656 => PTVA_1_1_combined + enzyme_VioC_biocrnpyler_392656; r9_1_biocrnpyler_392656_k*complex_PTVA_enzyme_VioC_biocrnpyler_392656;
    r9_1_biocrnpyler_392656_k = 10;
  r11_biocrnpyler_392656: complex_PTVA_enzyme_VioC_biocrnpyler_392656 => V_biocrnpyler_392656 + enzyme_VioC_biocrnpyler_392656; r11_biocrnpyler_392656_k*complex_PTVA_enzyme_VioC_biocrnpyler_392656;
    r11_biocrnpyler_392656_k = 100;
  r12_biocrnpyler_392656: PTDVA_1_1_combined + enzyme_VioC_biocrnpyler_392656 => complex_PTDVA_enzyme_VioC_biocrnpyler_392656; r12_biocrnpyler_392656_k*PTDVA_1_1_combined*enzyme_VioC_biocrnpyler_392656;
    r12_biocrnpyler_392656_k = 100;
  r12_1_biocrnpyler_392656: complex_PTDVA_enzyme_VioC_biocrnpyler_392656 => PTDVA_1_1_combined + enzyme_VioC_biocrnpyler_392656; r12_1_biocrnpyler_392656_k*complex_PTDVA_enzyme_VioC_biocrnpyler_392656;
    r12_1_biocrnpyler_392656_k = 10;
  r14_biocrnpyler_392656: complex_PTDVA_enzyme_VioC_biocrnpyler_392656 => DV_biocrnpyler_392656 + enzyme_VioC_biocrnpyler_392656; r14_biocrnpyler_392656_k*complex_PTDVA_enzyme_VioC_biocrnpyler_392656;
    r14_biocrnpyler_392656_k = 100;

  // Unit definitions:
  unit square_metre = metre^2;
  unit per_second = 1 / second;
  unit substance = dimensionless;
end
