// SBML level 3 version 2

model combined_model_of__combined_model_of__external_environment_model_combined_model_of__ahl_membrane_combined_model_of__biocrnpyler_996898()
  // model units - substance: mole, time: second, volume: litre, area: square_metre, length: metre, extent: mole

  // Compartments:
  compartment liposome_1_external_combined = 4e-6 litre;
  compartment liposome_1_internal_combined = 3e-6 litre;

  // Species:
  species PTVA_external_environment_model_1_combined in liposome_1_external_combined = 0;
  species PTDVA_external_environment_model_1_combined in liposome_1_external_combined = 0;
  species protein_RNAase_biocrnpyler_996898 in liposome_1_internal_combined = 6;
  species complex_protein_RNAase_rna_vioA_biocrnpyler_996898 in liposome_1_internal_combined = 0;
  species rna_vioA_biocrnpyler_996898 in liposome_1_internal_combined = 0;
  species dna_dna_vioA_biocrnpyler_996898 in liposome_1_internal_combined = 0;
  species ribosome_Ribo_biocrnpyler_996898 in liposome_1_internal_combined = 0;
  species protein_RNAP_biocrnpyler_996898 in liposome_1_internal_combined = 3;
  species protein_VioA_biocrnpyler_996898 in liposome_1_internal_combined = 0;
  species complex_dna_dna_vioA_protein_RNAP_biocrnpyler_996898 in liposome_1_internal_combined = 0;
  species complex_ribosome_Ribo_rna_vioA_biocrnpyler_996898 in liposome_1_internal_combined = 0;
  species rna_vioB_biocrnpyler_996898 in liposome_1_internal_combined = 0;
  species complex_ribosome_Ribo_rna_vioB_biocrnpyler_996898 in liposome_1_internal_combined = 0;
  species dna_dna_vioB_biocrnpyler_996898 in liposome_1_internal_combined = 0;
  species complex_dna_dna_vioB_protein_RNAP_biocrnpyler_996898 in liposome_1_internal_combined = 0;
  species complex_protein_RNAase_rna_vioB_biocrnpyler_996898 in liposome_1_internal_combined = 0;
  species protein_VioB_biocrnpyler_996898 in liposome_1_internal_combined = 0;
  species complex_protein_RNAase_rna_vioE_biocrnpyler_996898 in liposome_1_internal_combined = 0;
  species rna_vioE_biocrnpyler_996898 in liposome_1_internal_combined = 0;
  species dna_dna_vioE_biocrnpyler_996898 in liposome_1_internal_combined = 0;
  species complex_ribosome_Ribo_rna_vioE_biocrnpyler_996898 in liposome_1_internal_combined = 0;
  species protein_VioE_biocrnpyler_996898 in liposome_1_internal_combined = 0;
  species complex_dna_dna_vioE_protein_RNAP_biocrnpyler_996898 in liposome_1_internal_combined = 0;
  species dna_dna_vioD_biocrnpyler_996898 in liposome_1_internal_combined = 0;
  species complex_protein_RNAase_rna_vioD_biocrnpyler_996898 in liposome_1_internal_combined = 0;
  species complex_ribosome_Ribo_rna_vioD_biocrnpyler_996898 in liposome_1_internal_combined = 0;
  species rna_vioD_biocrnpyler_996898 in liposome_1_internal_combined = 0;
  species complex_dna_dna_vioD_protein_RNAP_biocrnpyler_996898 in liposome_1_internal_combined = 0;
  species protein_VioD_biocrnpyler_996898 in liposome_1_internal_combined = 0;
  species TRP_biocrnpyler_996898 in liposome_1_internal_combined = 0;
  species IPA_imine_biocrnpyler_996898 in liposome_1_internal_combined = 0;
  species IPA_imine_dimer_biocrnpyler_996898 in liposome_1_internal_combined = 0;
  species PTDVA_2_combined in liposome_1_internal_combined = 0;
  species PTVA_2_combined in liposome_1_internal_combined = 0;
  species protein_Ribo_biocrnpyler_996898 in liposome_1_internal_combined = 24;

  // Parameters:
  kb = 10000 per_second;
  kd = 10 per_second;

  // Reactions:
  r1: PTVA_2_combined -> PTVA_external_environment_model_1_combined; kb*PTVA_2_combined - kd*PTVA_external_environment_model_1_combined;
  r2: PTDVA_2_combined -> PTDVA_external_environment_model_1_combined; kb*PTDVA_2_combined - kd*PTDVA_external_environment_model_1_combined;
  r0_biocrnpyler_996898: dna_dna_vioA_biocrnpyler_996898 + protein_RNAP_biocrnpyler_996898 => complex_dna_dna_vioA_protein_RNAP_biocrnpyler_996898; r0_biocrnpyler_996898_k*dna_dna_vioA_biocrnpyler_996898*protein_RNAP_biocrnpyler_996898;
    r0_biocrnpyler_996898_k = 100;
  r0_1_biocrnpyler_996898: complex_dna_dna_vioA_protein_RNAP_biocrnpyler_996898 => dna_dna_vioA_biocrnpyler_996898 + protein_RNAP_biocrnpyler_996898; r0_1_biocrnpyler_996898_k*complex_dna_dna_vioA_protein_RNAP_biocrnpyler_996898;
    r0_1_biocrnpyler_996898_k = 10;
  r2_biocrnpyler_996898: complex_dna_dna_vioA_protein_RNAP_biocrnpyler_996898 => dna_dna_vioA_biocrnpyler_996898 + rna_vioA_biocrnpyler_996898 + protein_RNAP_biocrnpyler_996898; r2_biocrnpyler_996898_k*complex_dna_dna_vioA_protein_RNAP_biocrnpyler_996898;
    r2_biocrnpyler_996898_k = 0.05;
  r3_biocrnpyler_996898: rna_vioA_biocrnpyler_996898 + ribosome_Ribo_biocrnpyler_996898 => complex_ribosome_Ribo_rna_vioA_biocrnpyler_996898; r3_biocrnpyler_996898_k*rna_vioA_biocrnpyler_996898*ribosome_Ribo_biocrnpyler_996898;
    r3_biocrnpyler_996898_k = 100;
  r3_1_biocrnpyler_996898: complex_ribosome_Ribo_rna_vioA_biocrnpyler_996898 => rna_vioA_biocrnpyler_996898 + ribosome_Ribo_biocrnpyler_996898; r3_1_biocrnpyler_996898_k*complex_ribosome_Ribo_rna_vioA_biocrnpyler_996898;
    r3_1_biocrnpyler_996898_k = 10;
  r5_biocrnpyler_996898: complex_ribosome_Ribo_rna_vioA_biocrnpyler_996898 => rna_vioA_biocrnpyler_996898 + protein_VioA_biocrnpyler_996898 + ribosome_Ribo_biocrnpyler_996898; r5_biocrnpyler_996898_k*complex_ribosome_Ribo_rna_vioA_biocrnpyler_996898;
    r5_biocrnpyler_996898_k = 10;
  r6_biocrnpyler_996898: rna_vioA_biocrnpyler_996898 + protein_RNAase_biocrnpyler_996898 => complex_protein_RNAase_rna_vioA_biocrnpyler_996898; r6_biocrnpyler_996898_k*rna_vioA_biocrnpyler_996898*protein_RNAase_biocrnpyler_996898;
    r6_biocrnpyler_996898_k = 100;
  r6_1_biocrnpyler_996898: complex_protein_RNAase_rna_vioA_biocrnpyler_996898 => rna_vioA_biocrnpyler_996898 + protein_RNAase_biocrnpyler_996898; r6_1_biocrnpyler_996898_k*complex_protein_RNAase_rna_vioA_biocrnpyler_996898;
    r6_1_biocrnpyler_996898_k = 10;
  r8_biocrnpyler_996898: complex_protein_RNAase_rna_vioA_biocrnpyler_996898 => protein_RNAase_biocrnpyler_996898; r8_biocrnpyler_996898_k*complex_protein_RNAase_rna_vioA_biocrnpyler_996898;
    r8_biocrnpyler_996898_k = 0.001;
  r9_biocrnpyler_996898: dna_dna_vioB_biocrnpyler_996898 + protein_RNAP_biocrnpyler_996898 => complex_dna_dna_vioB_protein_RNAP_biocrnpyler_996898; r9_biocrnpyler_996898_k*dna_dna_vioB_biocrnpyler_996898*protein_RNAP_biocrnpyler_996898;
    r9_biocrnpyler_996898_k = 100;
  r9_1_biocrnpyler_996898: complex_dna_dna_vioB_protein_RNAP_biocrnpyler_996898 => dna_dna_vioB_biocrnpyler_996898 + protein_RNAP_biocrnpyler_996898; r9_1_biocrnpyler_996898_k*complex_dna_dna_vioB_protein_RNAP_biocrnpyler_996898;
    r9_1_biocrnpyler_996898_k = 10;
  r11_biocrnpyler_996898: complex_dna_dna_vioB_protein_RNAP_biocrnpyler_996898 => dna_dna_vioB_biocrnpyler_996898 + rna_vioB_biocrnpyler_996898 + protein_RNAP_biocrnpyler_996898; r11_biocrnpyler_996898_k*complex_dna_dna_vioB_protein_RNAP_biocrnpyler_996898;
    r11_biocrnpyler_996898_k = 0.05;
  r12_biocrnpyler_996898: rna_vioB_biocrnpyler_996898 + ribosome_Ribo_biocrnpyler_996898 => complex_ribosome_Ribo_rna_vioB_biocrnpyler_996898; r12_biocrnpyler_996898_k*rna_vioB_biocrnpyler_996898*ribosome_Ribo_biocrnpyler_996898;
    r12_biocrnpyler_996898_k = 100;
  r12_1_biocrnpyler_996898: complex_ribosome_Ribo_rna_vioB_biocrnpyler_996898 => rna_vioB_biocrnpyler_996898 + ribosome_Ribo_biocrnpyler_996898; r12_1_biocrnpyler_996898_k*complex_ribosome_Ribo_rna_vioB_biocrnpyler_996898;
    r12_1_biocrnpyler_996898_k = 10;
  r14_biocrnpyler_996898: complex_ribosome_Ribo_rna_vioB_biocrnpyler_996898 => rna_vioB_biocrnpyler_996898 + protein_VioB_biocrnpyler_996898 + ribosome_Ribo_biocrnpyler_996898; r14_biocrnpyler_996898_k*complex_ribosome_Ribo_rna_vioB_biocrnpyler_996898;
    r14_biocrnpyler_996898_k = 10;
  r15_biocrnpyler_996898: rna_vioB_biocrnpyler_996898 + protein_RNAase_biocrnpyler_996898 => complex_protein_RNAase_rna_vioB_biocrnpyler_996898; r15_biocrnpyler_996898_k*rna_vioB_biocrnpyler_996898*protein_RNAase_biocrnpyler_996898;
    r15_biocrnpyler_996898_k = 100;
  r15_1_biocrnpyler_996898: complex_protein_RNAase_rna_vioB_biocrnpyler_996898 => rna_vioB_biocrnpyler_996898 + protein_RNAase_biocrnpyler_996898; r15_1_biocrnpyler_996898_k*complex_protein_RNAase_rna_vioB_biocrnpyler_996898;
    r15_1_biocrnpyler_996898_k = 10;
  r17_biocrnpyler_996898: complex_protein_RNAase_rna_vioB_biocrnpyler_996898 => protein_RNAase_biocrnpyler_996898; r17_biocrnpyler_996898_k*complex_protein_RNAase_rna_vioB_biocrnpyler_996898;
    r17_biocrnpyler_996898_k = 0.001;
  r18_biocrnpyler_996898: dna_dna_vioE_biocrnpyler_996898 + protein_RNAP_biocrnpyler_996898 => complex_dna_dna_vioE_protein_RNAP_biocrnpyler_996898; r18_biocrnpyler_996898_k*dna_dna_vioE_biocrnpyler_996898*protein_RNAP_biocrnpyler_996898;
    r18_biocrnpyler_996898_k = 100;
  r18_1_biocrnpyler_996898: complex_dna_dna_vioE_protein_RNAP_biocrnpyler_996898 => dna_dna_vioE_biocrnpyler_996898 + protein_RNAP_biocrnpyler_996898; r18_1_biocrnpyler_996898_k*complex_dna_dna_vioE_protein_RNAP_biocrnpyler_996898;
    r18_1_biocrnpyler_996898_k = 10;
  r20_biocrnpyler_996898: complex_dna_dna_vioE_protein_RNAP_biocrnpyler_996898 => dna_dna_vioE_biocrnpyler_996898 + rna_vioE_biocrnpyler_996898 + protein_RNAP_biocrnpyler_996898; r20_biocrnpyler_996898_k*complex_dna_dna_vioE_protein_RNAP_biocrnpyler_996898;
    r20_biocrnpyler_996898_k = 0.05;
  r21_biocrnpyler_996898: rna_vioE_biocrnpyler_996898 + ribosome_Ribo_biocrnpyler_996898 => complex_ribosome_Ribo_rna_vioE_biocrnpyler_996898; r21_biocrnpyler_996898_k*rna_vioE_biocrnpyler_996898*ribosome_Ribo_biocrnpyler_996898;
    r21_biocrnpyler_996898_k = 100;
  r21_1_biocrnpyler_996898: complex_ribosome_Ribo_rna_vioE_biocrnpyler_996898 => rna_vioE_biocrnpyler_996898 + ribosome_Ribo_biocrnpyler_996898; r21_1_biocrnpyler_996898_k*complex_ribosome_Ribo_rna_vioE_biocrnpyler_996898;
    r21_1_biocrnpyler_996898_k = 10;
  r23_biocrnpyler_996898: complex_ribosome_Ribo_rna_vioE_biocrnpyler_996898 => rna_vioE_biocrnpyler_996898 + protein_VioE_biocrnpyler_996898 + ribosome_Ribo_biocrnpyler_996898; r23_biocrnpyler_996898_k*complex_ribosome_Ribo_rna_vioE_biocrnpyler_996898;
    r23_biocrnpyler_996898_k = 10;
  r24_biocrnpyler_996898: rna_vioE_biocrnpyler_996898 + protein_RNAase_biocrnpyler_996898 => complex_protein_RNAase_rna_vioE_biocrnpyler_996898; r24_biocrnpyler_996898_k*rna_vioE_biocrnpyler_996898*protein_RNAase_biocrnpyler_996898;
    r24_biocrnpyler_996898_k = 100;
  r24_1_biocrnpyler_996898: complex_protein_RNAase_rna_vioE_biocrnpyler_996898 => rna_vioE_biocrnpyler_996898 + protein_RNAase_biocrnpyler_996898; r24_1_biocrnpyler_996898_k*complex_protein_RNAase_rna_vioE_biocrnpyler_996898;
    r24_1_biocrnpyler_996898_k = 10;
  r26_biocrnpyler_996898: complex_protein_RNAase_rna_vioE_biocrnpyler_996898 => protein_RNAase_biocrnpyler_996898; r26_biocrnpyler_996898_k*complex_protein_RNAase_rna_vioE_biocrnpyler_996898;
    r26_biocrnpyler_996898_k = 0.001;
  r27_biocrnpyler_996898: dna_dna_vioD_biocrnpyler_996898 + protein_RNAP_biocrnpyler_996898 => complex_dna_dna_vioD_protein_RNAP_biocrnpyler_996898; r27_biocrnpyler_996898_k*dna_dna_vioD_biocrnpyler_996898*protein_RNAP_biocrnpyler_996898;
    r27_biocrnpyler_996898_k = 100;
  r27_1_biocrnpyler_996898: complex_dna_dna_vioD_protein_RNAP_biocrnpyler_996898 => dna_dna_vioD_biocrnpyler_996898 + protein_RNAP_biocrnpyler_996898; r27_1_biocrnpyler_996898_k*complex_dna_dna_vioD_protein_RNAP_biocrnpyler_996898;
    r27_1_biocrnpyler_996898_k = 10;
  r29_biocrnpyler_996898: complex_dna_dna_vioD_protein_RNAP_biocrnpyler_996898 => dna_dna_vioD_biocrnpyler_996898 + rna_vioD_biocrnpyler_996898 + protein_RNAP_biocrnpyler_996898; r29_biocrnpyler_996898_k*complex_dna_dna_vioD_protein_RNAP_biocrnpyler_996898;
    r29_biocrnpyler_996898_k = 0.05;
  r30_biocrnpyler_996898: rna_vioD_biocrnpyler_996898 + ribosome_Ribo_biocrnpyler_996898 => complex_ribosome_Ribo_rna_vioD_biocrnpyler_996898; r30_biocrnpyler_996898_k*rna_vioD_biocrnpyler_996898*ribosome_Ribo_biocrnpyler_996898;
    r30_biocrnpyler_996898_k = 100;
  r30_1_biocrnpyler_996898: complex_ribosome_Ribo_rna_vioD_biocrnpyler_996898 => rna_vioD_biocrnpyler_996898 + ribosome_Ribo_biocrnpyler_996898; r30_1_biocrnpyler_996898_k*complex_ribosome_Ribo_rna_vioD_biocrnpyler_996898;
    r30_1_biocrnpyler_996898_k = 10;
  r32_biocrnpyler_996898: complex_ribosome_Ribo_rna_vioD_biocrnpyler_996898 => rna_vioD_biocrnpyler_996898 + protein_VioD_biocrnpyler_996898 + ribosome_Ribo_biocrnpyler_996898; r32_biocrnpyler_996898_k*complex_ribosome_Ribo_rna_vioD_biocrnpyler_996898;
    r32_biocrnpyler_996898_k = 10;
  r33_biocrnpyler_996898: rna_vioD_biocrnpyler_996898 + protein_RNAase_biocrnpyler_996898 => complex_protein_RNAase_rna_vioD_biocrnpyler_996898; r33_biocrnpyler_996898_k*rna_vioD_biocrnpyler_996898*protein_RNAase_biocrnpyler_996898;
    r33_biocrnpyler_996898_k = 100;
  r33_1_biocrnpyler_996898: complex_protein_RNAase_rna_vioD_biocrnpyler_996898 => rna_vioD_biocrnpyler_996898 + protein_RNAase_biocrnpyler_996898; r33_1_biocrnpyler_996898_k*complex_protein_RNAase_rna_vioD_biocrnpyler_996898;
    r33_1_biocrnpyler_996898_k = 10;
  r35_biocrnpyler_996898: complex_protein_RNAase_rna_vioD_biocrnpyler_996898 => protein_RNAase_biocrnpyler_996898; r35_biocrnpyler_996898_k*complex_protein_RNAase_rna_vioD_biocrnpyler_996898;
    r35_biocrnpyler_996898_k = 0.001;
  r36_biocrnpyler_996898: protein_VioA_biocrnpyler_996898 + TRP_biocrnpyler_996898 => protein_VioA_biocrnpyler_996898 + IPA_imine_biocrnpyler_996898; r36_biocrnpyler_996898_k*protein_VioA_biocrnpyler_996898*TRP_biocrnpyler_996898;
    r36_biocrnpyler_996898_k = 10;
  r37_biocrnpyler_996898: protein_VioB_biocrnpyler_996898 + 2 IPA_imine_biocrnpyler_996898 => protein_VioB_biocrnpyler_996898 + IPA_imine_dimer_biocrnpyler_996898; r37_biocrnpyler_996898_k*protein_VioB_biocrnpyler_996898*IPA_imine_biocrnpyler_996898^2;
    r37_biocrnpyler_996898_k = 10;
  r38_biocrnpyler_996898: protein_VioE_biocrnpyler_996898 + IPA_imine_dimer_biocrnpyler_996898 => protein_VioE_biocrnpyler_996898 + PTDVA_2_combined; r38_biocrnpyler_996898_k*protein_VioE_biocrnpyler_996898*IPA_imine_dimer_biocrnpyler_996898;
    r38_biocrnpyler_996898_k = 10;
  r39_biocrnpyler_996898: protein_VioD_biocrnpyler_996898 + PTDVA_2_combined => protein_VioD_biocrnpyler_996898 + PTVA_2_combined; r39_biocrnpyler_996898_k*protein_VioD_biocrnpyler_996898*PTDVA_2_combined;
    r39_biocrnpyler_996898_k = 10;

  // Unit definitions:
  unit square_metre = metre^2;
  unit per_second = 1 / second;
  unit substance = dimensionless;
end
