// SBML level 3 version 2

model biocrnpyler_315807()
  // model units - substance: mole, time: second, volume: litre, area: square_metre, length: metre, extent: mole

  // Compartments:
  compartment default = 1e-6;

  // Species:
  species ribosome_Ribo in default = 23;
  species dna_dna_vioC in default = 0;
  species protein_RNAase in default = 6;
  species rna_vioC in default = 0;
  species complex_dna_dna_vioC_protein_RNAP in default = 0;
  species complex_ribosome_Ribo_rna_vioC in default = 0;
  species protein_VioC in default = 0;
  species complex_protein_RNAase_rna_vioC in default = 0;
  species protein_RNAP in default = 3;
  species PTVA in default = 0;
  species V in default = 0;
  species PTDVA in default = 0;
  species DV in default = 0;
  species protein_Ribo in default = 0;

  // Reactions:
  r0: dna_dna_vioC + protein_RNAP => complex_dna_dna_vioC_protein_RNAP; r0_k*dna_dna_vioC*protein_RNAP;
    r0_k = 100;
  r0_1: complex_dna_dna_vioC_protein_RNAP => dna_dna_vioC + protein_RNAP; r0_1_k*complex_dna_dna_vioC_protein_RNAP;
    r0_1_k = 10;
  r2: complex_dna_dna_vioC_protein_RNAP => dna_dna_vioC + rna_vioC + protein_RNAP; r2_k*complex_dna_dna_vioC_protein_RNAP;
    r2_k = 0.05;
  r3: rna_vioC + ribosome_Ribo => complex_ribosome_Ribo_rna_vioC; r3_k*rna_vioC*ribosome_Ribo;
    r3_k = 100;
  r3_1: complex_ribosome_Ribo_rna_vioC => rna_vioC + ribosome_Ribo; r3_1_k*complex_ribosome_Ribo_rna_vioC;
    r3_1_k = 10;
  r5: complex_ribosome_Ribo_rna_vioC => rna_vioC + protein_VioC + ribosome_Ribo; r5_k*complex_ribosome_Ribo_rna_vioC;
    r5_k = 10;
  r6: rna_vioC + protein_RNAase => complex_protein_RNAase_rna_vioC; r6_k*rna_vioC*protein_RNAase;
    r6_k = 100;
  r6_1: complex_protein_RNAase_rna_vioC => rna_vioC + protein_RNAase; r6_1_k*complex_protein_RNAase_rna_vioC;
    r6_1_k = 10;
  r8: complex_protein_RNAase_rna_vioC => protein_RNAase; r8_k*complex_protein_RNAase_rna_vioC;
    r8_k = 0.001;
  r9: protein_VioC + PTVA => protein_VioC + V; r9_k*protein_VioC*PTVA;
    r9_k = 3.38;
  r10: protein_VioC + PTDVA => protein_VioC + DV; r10_k*protein_VioC*PTDVA;
    r10_k = 3.38;

  // Unit definitions:
  unit square_metre = metre^2;
end
