// SBML level 3 version 2

model combined_model_of__combined_model_of__external_environment_model_combined_model_of__ahl_membrane_combined_model_of__biocrnpyler_357611()
  // model units - substance: mole, time: second, volume: litre, area: square_metre, length: metre, extent: mole

  // Compartments:
  compartment liposome_2_external_combined = 5e-6 litre;
  compartment liposome_2_internal_combined = 4e-6 litre;

  // Species:
  species PTVA_external_environment_model_1_combined in liposome_2_external_combined = 0;
  species PTDVA_external_environment_model_1_combined in liposome_2_external_combined = 0;
  species protein_RNAase_biocrnpyler_357611 in liposome_2_internal_combined = 6;
  species rna_vioC_biocrnpyler_357611 in liposome_2_internal_combined = 0;
  species ribosome_Ribo_biocrnpyler_357611 in liposome_2_internal_combined = 0;
  species protein_VioC_biocrnpyler_357611 in liposome_2_internal_combined = 0;
  species protein_RNAP_biocrnpyler_357611 in liposome_2_internal_combined = 3;
  species dna_dna_vioC_biocrnpyler_357611 in liposome_2_internal_combined = 0;
  species complex_ribosome_Ribo_rna_vioC_biocrnpyler_357611 in liposome_2_internal_combined = 0;
  species complex_dna_dna_vioC_protein_RNAP_biocrnpyler_357611 in liposome_2_internal_combined = 0;
  species complex_protein_RNAase_rna_vioC_biocrnpyler_357611 in liposome_2_internal_combined = 0;
  species PTVA_2_combined in liposome_2_internal_combined = 0;
  species V_biocrnpyler_357611 in liposome_2_internal_combined = 0;
  species PTDVA_2_combined in liposome_2_internal_combined = 0;
  species DV_biocrnpyler_357611 in liposome_2_internal_combined = 0;
  species protein_Ribo_biocrnpyler_357611 in liposome_2_internal_combined = 24;

  // Parameters:
  kb = 10 per_second;
  kd = 10000 per_second;

  // Reactions:
  r3: PTVA_2_combined -> PTVA_external_environment_model_1_combined; kb*PTVA_2_combined - kd*PTVA_external_environment_model_1_combined;
  r4: PTDVA_2_combined -> PTDVA_external_environment_model_1_combined; kb*PTDVA_2_combined - kd*PTDVA_external_environment_model_1_combined;
  r0_biocrnpyler_357611: dna_dna_vioC_biocrnpyler_357611 + protein_RNAP_biocrnpyler_357611 => complex_dna_dna_vioC_protein_RNAP_biocrnpyler_357611; r0_biocrnpyler_357611_k*dna_dna_vioC_biocrnpyler_357611*protein_RNAP_biocrnpyler_357611;
    r0_biocrnpyler_357611_k = 100;
  r0_1_biocrnpyler_357611: complex_dna_dna_vioC_protein_RNAP_biocrnpyler_357611 => dna_dna_vioC_biocrnpyler_357611 + protein_RNAP_biocrnpyler_357611; r0_1_biocrnpyler_357611_k*complex_dna_dna_vioC_protein_RNAP_biocrnpyler_357611;
    r0_1_biocrnpyler_357611_k = 10;
  r2_biocrnpyler_357611: complex_dna_dna_vioC_protein_RNAP_biocrnpyler_357611 => dna_dna_vioC_biocrnpyler_357611 + rna_vioC_biocrnpyler_357611 + protein_RNAP_biocrnpyler_357611; r2_biocrnpyler_357611_k*complex_dna_dna_vioC_protein_RNAP_biocrnpyler_357611;
    r2_biocrnpyler_357611_k = 0.05;
  r3_biocrnpyler_357611: rna_vioC_biocrnpyler_357611 + ribosome_Ribo_biocrnpyler_357611 => complex_ribosome_Ribo_rna_vioC_biocrnpyler_357611; r3_biocrnpyler_357611_k*rna_vioC_biocrnpyler_357611*ribosome_Ribo_biocrnpyler_357611;
    r3_biocrnpyler_357611_k = 100;
  r3_1_biocrnpyler_357611: complex_ribosome_Ribo_rna_vioC_biocrnpyler_357611 => rna_vioC_biocrnpyler_357611 + ribosome_Ribo_biocrnpyler_357611; r3_1_biocrnpyler_357611_k*complex_ribosome_Ribo_rna_vioC_biocrnpyler_357611;
    r3_1_biocrnpyler_357611_k = 10;
  r5_biocrnpyler_357611: complex_ribosome_Ribo_rna_vioC_biocrnpyler_357611 => rna_vioC_biocrnpyler_357611 + protein_VioC_biocrnpyler_357611 + ribosome_Ribo_biocrnpyler_357611; r5_biocrnpyler_357611_k*complex_ribosome_Ribo_rna_vioC_biocrnpyler_357611;
    r5_biocrnpyler_357611_k = 10;
  r6_biocrnpyler_357611: rna_vioC_biocrnpyler_357611 + protein_RNAase_biocrnpyler_357611 => complex_protein_RNAase_rna_vioC_biocrnpyler_357611; r6_biocrnpyler_357611_k*rna_vioC_biocrnpyler_357611*protein_RNAase_biocrnpyler_357611;
    r6_biocrnpyler_357611_k = 100;
  r6_1_biocrnpyler_357611: complex_protein_RNAase_rna_vioC_biocrnpyler_357611 => rna_vioC_biocrnpyler_357611 + protein_RNAase_biocrnpyler_357611; r6_1_biocrnpyler_357611_k*complex_protein_RNAase_rna_vioC_biocrnpyler_357611;
    r6_1_biocrnpyler_357611_k = 10;
  r8_biocrnpyler_357611: complex_protein_RNAase_rna_vioC_biocrnpyler_357611 => protein_RNAase_biocrnpyler_357611; r8_biocrnpyler_357611_k*complex_protein_RNAase_rna_vioC_biocrnpyler_357611;
    r8_biocrnpyler_357611_k = 0.001;
  r9_biocrnpyler_357611: protein_VioC_biocrnpyler_357611 + PTVA_2_combined => protein_VioC_biocrnpyler_357611 + V_biocrnpyler_357611; r9_biocrnpyler_357611_k*protein_VioC_biocrnpyler_357611*PTVA_2_combined;
    r9_biocrnpyler_357611_k = 10;
  r10_biocrnpyler_357611: protein_VioC_biocrnpyler_357611 + PTDVA_2_combined => protein_VioC_biocrnpyler_357611 + DV_biocrnpyler_357611; r10_biocrnpyler_357611_k*protein_VioC_biocrnpyler_357611*PTDVA_2_combined;
    r10_biocrnpyler_357611_k = 10;

  // Unit definitions:
  unit square_metre = metre^2;
  unit per_second = 1 / second;
  unit substance = dimensionless;
end
