// SBML level 3 version 2

model ahl_membrane()
  // model units - substance: substance, time: second, extent: mole

  // Compartments:
  compartment internal = 2e-6 litre;
  compartment external = 1e-6 litre;

  // Species:
  species PTVA in internal = 0;
  species PTVA_1 in external = 0;
  species PTDVA in internal = 0;
  species PTDVA_1 in external = 0;

  // Parameters:
  kb = 10 per_second;
  kd = 10000 per_second;

  // Reactions:
  r3: PTVA -> PTVA_1; kb*PTVA - kd*PTVA_1;
  r4: PTDVA -> PTDVA_1; kb*PTDVA - kd*PTDVA_1;

  // Unit definitions:
  unit per_second = 1 / second;
  unit substance = dimensionless;
end
