// SBML level 3 version 2

model combined_model_of__combined_model_of__combined_model_of__external_environment_model_combined_model_of__ahl_membrane_combined_model_of__biocrnpyler_420216_combined_model_of__combined_model_of__external_environment_model_combined_model_of__ahl_membrane_combined_model_of__biocrnpyler_893799()
  // model units - substance: mole, time: second, volume: litre, area: square_metre, length: metre, extent: mole

  // Compartments:
  compartment actual_external_compartment_combined = 9e-6 litre;
  compartment liposome_1_internal_combined = 3e-6 litre;
  compartment liposome_2_internal_combined = 4e-6 litre;

  // Species:
  species protein_RNAP_biocrnpyler_420216 in liposome_1_internal_combined = 3;
  species complex_dna_dna_vioA_protein_RNAP_biocrnpyler_420216 in liposome_1_internal_combined = 0;
  species complex_protein_Ribo_transcript_vioA_biocrnpyler_420216 in liposome_1_internal_combined = 0;
  species protein_Ribo_biocrnpyler_420216 in liposome_1_internal_combined = 24;
  species enzyme_VioA_biocrnpyler_420216 in liposome_1_internal_combined = 0;
  species protein_RNAase_biocrnpyler_420216 in liposome_1_internal_combined = 6;
  species complex_protein_RNAase_transcript_vioA_biocrnpyler_420216 in liposome_1_internal_combined = 0;
  species transcript_vioA_biocrnpyler_420216 in liposome_1_internal_combined = 0;
  species dna_dna_vioA_biocrnpyler_420216 in liposome_1_internal_combined = 10/liposome_1_internal_combined;
  species enzyme_VioB_biocrnpyler_420216 in liposome_1_internal_combined = 0;
  species complex_protein_Ribo_transcript_vioB_biocrnpyler_420216 in liposome_1_internal_combined = 0;
  species transcript_vioB_biocrnpyler_420216 in liposome_1_internal_combined = 0;
  species complex_dna_dna_vioB_protein_RNAP_biocrnpyler_420216 in liposome_1_internal_combined = 0;
  species dna_dna_vioB_biocrnpyler_420216 in liposome_1_internal_combined = 10/liposome_1_internal_combined;
  species complex_protein_RNAase_transcript_vioB_biocrnpyler_420216 in liposome_1_internal_combined = 0;
  species complex_protein_RNAase_transcript_vioE_biocrnpyler_420216 in liposome_1_internal_combined = 0;
  species complex_protein_Ribo_transcript_vioE_biocrnpyler_420216 in liposome_1_internal_combined = 0;
  species dna_dna_vioE_biocrnpyler_420216 in liposome_1_internal_combined = 10/liposome_1_internal_combined;
  species enzyme_VioE_biocrnpyler_420216 in liposome_1_internal_combined = 0;
  species complex_dna_dna_vioE_protein_RNAP_biocrnpyler_420216 in liposome_1_internal_combined = 0;
  species transcript_vioE_biocrnpyler_420216 in liposome_1_internal_combined = 0;
  species complex_protein_RNAase_transcript_vioD_biocrnpyler_420216 in liposome_1_internal_combined = 0;
  species complex_protein_Ribo_transcript_vioD_biocrnpyler_420216 in liposome_1_internal_combined = 0;
  species transcript_vioD_biocrnpyler_420216 in liposome_1_internal_combined = 0;
  species complex_dna_dna_vioD_protein_RNAP_biocrnpyler_420216 in liposome_1_internal_combined = 0;
  species enzyme_VioD_biocrnpyler_420216 in liposome_1_internal_combined = 0;
  species dna_dna_vioD_biocrnpyler_420216 in liposome_1_internal_combined = 10/liposome_1_internal_combined;
  species TRP_biocrnpyler_420216 in liposome_1_internal_combined = 10/liposome_1_internal_combined;
  species IPA_imine_biocrnpyler_420216 in liposome_1_internal_combined = 0;
  species complex_TRP_enzyme_VioA_biocrnpyler_420216 in liposome_1_internal_combined = 0;
  species IPA_imine_dimer_biocrnpyler_420216 in liposome_1_internal_combined = 0;
  species complex_2x_IPA_imine_enzyme_VioB_biocrnpyler_420216 in liposome_1_internal_combined = 0;
  species PTDVA_biocrnpyler_420216 in liposome_1_internal_combined = 0;
  species complex_IPA_imine_dimer_enzyme_VioE_biocrnpyler_420216 in liposome_1_internal_combined = 0;
  species PTVA_2_combined in liposome_1_internal_combined = 0;
  species complex_PTDVA_enzyme_VioD_biocrnpyler_420216 in liposome_1_internal_combined = 0;
  species protein_RNAP_biocrnpyler_893799 in liposome_2_internal_combined = 3;
  species complex_protein_Ribo_transcript_vioC_biocrnpyler_893799 in liposome_2_internal_combined = 0;
  species complex_dna_dna_vioC_protein_RNAP_biocrnpyler_893799 in liposome_2_internal_combined = 0;
  species complex_protein_RNAase_transcript_vioC_biocrnpyler_893799 in liposome_2_internal_combined = 0;
  species protein_Ribo_biocrnpyler_893799 in liposome_2_internal_combined = 24;
  species transcript_vioC_biocrnpyler_893799 in liposome_2_internal_combined = 0;
  species protein_RNAase_biocrnpyler_893799 in liposome_2_internal_combined = 6;
  species enzyme_VioC_biocrnpyler_893799 in liposome_2_internal_combined = 0;
  species dna_dna_vioC_biocrnpyler_893799 in liposome_2_internal_combined = 10/liposome_2_internal_combined;
  species V_biocrnpyler_893799 in liposome_2_internal_combined = 0;
  species complex_PTVA_enzyme_VioC_biocrnpyler_893799 in liposome_2_internal_combined = 0;
  species PTDVA_biocrnpyler_893799 in liposome_2_internal_combined = 0;
  species DV_biocrnpyler_893799 in liposome_2_internal_combined = 0;
  species complex_PTDVA_enzyme_VioC_biocrnpyler_893799 in liposome_2_internal_combined = 0;
  species PTVA_external_environment_model_1_combined_1_combined in actual_external_compartment = 0;

  // Parameters:
  kb_combined = 10000 per_second;
  kd_combined = 10 per_second;
  kb = 10 per_second;
  kd = 10000 per_second;

  // Reactions:
  r1_combined: PTVA_2_combined -> PTVA_external_environment_model_1_combined_1_combined; kb_combined*PTVA_2_combined - kd_combined*PTVA_external_environment_model_1_combined_1_combined;
  r0_biocrnpyler_420216: dna_dna_vioA_biocrnpyler_420216 + protein_RNAP_biocrnpyler_420216 => complex_dna_dna_vioA_protein_RNAP_biocrnpyler_420216; r0_biocrnpyler_420216_k*dna_dna_vioA_biocrnpyler_420216*protein_RNAP_biocrnpyler_420216;
    r0_biocrnpyler_420216_k = 100;
  r0_1_biocrnpyler_420216: complex_dna_dna_vioA_protein_RNAP_biocrnpyler_420216 => dna_dna_vioA_biocrnpyler_420216 + protein_RNAP_biocrnpyler_420216; r0_1_biocrnpyler_420216_k*complex_dna_dna_vioA_protein_RNAP_biocrnpyler_420216;
    r0_1_biocrnpyler_420216_k = 10;
  r2_biocrnpyler_420216: complex_dna_dna_vioA_protein_RNAP_biocrnpyler_420216 => dna_dna_vioA_biocrnpyler_420216 + transcript_vioA_biocrnpyler_420216 + protein_RNAP_biocrnpyler_420216; r2_biocrnpyler_420216_k*complex_dna_dna_vioA_protein_RNAP_biocrnpyler_420216;
    r2_biocrnpyler_420216_k = 0.05;
  r3_biocrnpyler_420216: transcript_vioA_biocrnpyler_420216 + protein_Ribo_biocrnpyler_420216 => complex_protein_Ribo_transcript_vioA_biocrnpyler_420216; r3_biocrnpyler_420216_k*transcript_vioA_biocrnpyler_420216*protein_Ribo_biocrnpyler_420216;
    r3_biocrnpyler_420216_k = 100;
  r3_1_biocrnpyler_420216: complex_protein_Ribo_transcript_vioA_biocrnpyler_420216 => transcript_vioA_biocrnpyler_420216 + protein_Ribo_biocrnpyler_420216; r3_1_biocrnpyler_420216_k*complex_protein_Ribo_transcript_vioA_biocrnpyler_420216;
    r3_1_biocrnpyler_420216_k = 10;
  r5_biocrnpyler_420216: complex_protein_Ribo_transcript_vioA_biocrnpyler_420216 => transcript_vioA_biocrnpyler_420216 + enzyme_VioA_biocrnpyler_420216 + protein_Ribo_biocrnpyler_420216; r5_biocrnpyler_420216_k*complex_protein_Ribo_transcript_vioA_biocrnpyler_420216;
    r5_biocrnpyler_420216_k = 0.05;
  r6_biocrnpyler_420216: transcript_vioA_biocrnpyler_420216 + protein_RNAase_biocrnpyler_420216 => complex_protein_RNAase_transcript_vioA_biocrnpyler_420216; r6_biocrnpyler_420216_k*transcript_vioA_biocrnpyler_420216*protein_RNAase_biocrnpyler_420216;
    r6_biocrnpyler_420216_k = 100;
  r6_1_biocrnpyler_420216: complex_protein_RNAase_transcript_vioA_biocrnpyler_420216 => transcript_vioA_biocrnpyler_420216 + protein_RNAase_biocrnpyler_420216; r6_1_biocrnpyler_420216_k*complex_protein_RNAase_transcript_vioA_biocrnpyler_420216;
    r6_1_biocrnpyler_420216_k = 10;
  r8_biocrnpyler_420216: complex_protein_RNAase_transcript_vioA_biocrnpyler_420216 => protein_RNAase_biocrnpyler_420216; r8_biocrnpyler_420216_k*complex_protein_RNAase_transcript_vioA_biocrnpyler_420216;
    r8_biocrnpyler_420216_k = 0.001;
  r9_biocrnpyler_420216: dna_dna_vioB_biocrnpyler_420216 + protein_RNAP_biocrnpyler_420216 => complex_dna_dna_vioB_protein_RNAP_biocrnpyler_420216; r9_biocrnpyler_420216_k*dna_dna_vioB_biocrnpyler_420216*protein_RNAP_biocrnpyler_420216;
    r9_biocrnpyler_420216_k = 100;
  r9_1_biocrnpyler_420216: complex_dna_dna_vioB_protein_RNAP_biocrnpyler_420216 => dna_dna_vioB_biocrnpyler_420216 + protein_RNAP_biocrnpyler_420216; r9_1_biocrnpyler_420216_k*complex_dna_dna_vioB_protein_RNAP_biocrnpyler_420216;
    r9_1_biocrnpyler_420216_k = 10;
  r11_biocrnpyler_420216: complex_dna_dna_vioB_protein_RNAP_biocrnpyler_420216 => dna_dna_vioB_biocrnpyler_420216 + transcript_vioB_biocrnpyler_420216 + protein_RNAP_biocrnpyler_420216; r11_biocrnpyler_420216_k*complex_dna_dna_vioB_protein_RNAP_biocrnpyler_420216;
    r11_biocrnpyler_420216_k = 0.05;
  r12_biocrnpyler_420216: transcript_vioB_biocrnpyler_420216 + protein_Ribo_biocrnpyler_420216 => complex_protein_Ribo_transcript_vioB_biocrnpyler_420216; r12_biocrnpyler_420216_k*transcript_vioB_biocrnpyler_420216*protein_Ribo_biocrnpyler_420216;
    r12_biocrnpyler_420216_k = 100;
  r12_1_biocrnpyler_420216: complex_protein_Ribo_transcript_vioB_biocrnpyler_420216 => transcript_vioB_biocrnpyler_420216 + protein_Ribo_biocrnpyler_420216; r12_1_biocrnpyler_420216_k*complex_protein_Ribo_transcript_vioB_biocrnpyler_420216;
    r12_1_biocrnpyler_420216_k = 10;
  r14_biocrnpyler_420216: complex_protein_Ribo_transcript_vioB_biocrnpyler_420216 => transcript_vioB_biocrnpyler_420216 + enzyme_VioB_biocrnpyler_420216 + protein_Ribo_biocrnpyler_420216; r14_biocrnpyler_420216_k*complex_protein_Ribo_transcript_vioB_biocrnpyler_420216;
    r14_biocrnpyler_420216_k = 0.05;
  r15_biocrnpyler_420216: transcript_vioB_biocrnpyler_420216 + protein_RNAase_biocrnpyler_420216 => complex_protein_RNAase_transcript_vioB_biocrnpyler_420216; r15_biocrnpyler_420216_k*transcript_vioB_biocrnpyler_420216*protein_RNAase_biocrnpyler_420216;
    r15_biocrnpyler_420216_k = 100;
  r15_1_biocrnpyler_420216: complex_protein_RNAase_transcript_vioB_biocrnpyler_420216 => transcript_vioB_biocrnpyler_420216 + protein_RNAase_biocrnpyler_420216; r15_1_biocrnpyler_420216_k*complex_protein_RNAase_transcript_vioB_biocrnpyler_420216;
    r15_1_biocrnpyler_420216_k = 10;
  r17_biocrnpyler_420216: complex_protein_RNAase_transcript_vioB_biocrnpyler_420216 => protein_RNAase_biocrnpyler_420216; r17_biocrnpyler_420216_k*complex_protein_RNAase_transcript_vioB_biocrnpyler_420216;
    r17_biocrnpyler_420216_k = 0.001;
  r18_biocrnpyler_420216: dna_dna_vioE_biocrnpyler_420216 + protein_RNAP_biocrnpyler_420216 => complex_dna_dna_vioE_protein_RNAP_biocrnpyler_420216; r18_biocrnpyler_420216_k*dna_dna_vioE_biocrnpyler_420216*protein_RNAP_biocrnpyler_420216;
    r18_biocrnpyler_420216_k = 100;
  r18_1_biocrnpyler_420216: complex_dna_dna_vioE_protein_RNAP_biocrnpyler_420216 => dna_dna_vioE_biocrnpyler_420216 + protein_RNAP_biocrnpyler_420216; r18_1_biocrnpyler_420216_k*complex_dna_dna_vioE_protein_RNAP_biocrnpyler_420216;
    r18_1_biocrnpyler_420216_k = 10;
  r20_biocrnpyler_420216: complex_dna_dna_vioE_protein_RNAP_biocrnpyler_420216 => dna_dna_vioE_biocrnpyler_420216 + transcript_vioE_biocrnpyler_420216 + protein_RNAP_biocrnpyler_420216; r20_biocrnpyler_420216_k*complex_dna_dna_vioE_protein_RNAP_biocrnpyler_420216;
    r20_biocrnpyler_420216_k = 0.05;
  r21_biocrnpyler_420216: transcript_vioE_biocrnpyler_420216 + protein_Ribo_biocrnpyler_420216 => complex_protein_Ribo_transcript_vioE_biocrnpyler_420216; r21_biocrnpyler_420216_k*transcript_vioE_biocrnpyler_420216*protein_Ribo_biocrnpyler_420216;
    r21_biocrnpyler_420216_k = 100;
  r21_1_biocrnpyler_420216: complex_protein_Ribo_transcript_vioE_biocrnpyler_420216 => transcript_vioE_biocrnpyler_420216 + protein_Ribo_biocrnpyler_420216; r21_1_biocrnpyler_420216_k*complex_protein_Ribo_transcript_vioE_biocrnpyler_420216;
    r21_1_biocrnpyler_420216_k = 10;
  r23_biocrnpyler_420216: complex_protein_Ribo_transcript_vioE_biocrnpyler_420216 => transcript_vioE_biocrnpyler_420216 + enzyme_VioE_biocrnpyler_420216 + protein_Ribo_biocrnpyler_420216; r23_biocrnpyler_420216_k*complex_protein_Ribo_transcript_vioE_biocrnpyler_420216;
    r23_biocrnpyler_420216_k = 0.05;
  r24_biocrnpyler_420216: transcript_vioE_biocrnpyler_420216 + protein_RNAase_biocrnpyler_420216 => complex_protein_RNAase_transcript_vioE_biocrnpyler_420216; r24_biocrnpyler_420216_k*transcript_vioE_biocrnpyler_420216*protein_RNAase_biocrnpyler_420216;
    r24_biocrnpyler_420216_k = 100;
  r24_1_biocrnpyler_420216: complex_protein_RNAase_transcript_vioE_biocrnpyler_420216 => transcript_vioE_biocrnpyler_420216 + protein_RNAase_biocrnpyler_420216; r24_1_biocrnpyler_420216_k*complex_protein_RNAase_transcript_vioE_biocrnpyler_420216;
    r24_1_biocrnpyler_420216_k = 10;
  r26_biocrnpyler_420216: complex_protein_RNAase_transcript_vioE_biocrnpyler_420216 => protein_RNAase_biocrnpyler_420216; r26_biocrnpyler_420216_k*complex_protein_RNAase_transcript_vioE_biocrnpyler_420216;
    r26_biocrnpyler_420216_k = 0.001;
  r27_biocrnpyler_420216: dna_dna_vioD_biocrnpyler_420216 + protein_RNAP_biocrnpyler_420216 => complex_dna_dna_vioD_protein_RNAP_biocrnpyler_420216; r27_biocrnpyler_420216_k*dna_dna_vioD_biocrnpyler_420216*protein_RNAP_biocrnpyler_420216;
    r27_biocrnpyler_420216_k = 100;
  r27_1_biocrnpyler_420216: complex_dna_dna_vioD_protein_RNAP_biocrnpyler_420216 => dna_dna_vioD_biocrnpyler_420216 + protein_RNAP_biocrnpyler_420216; r27_1_biocrnpyler_420216_k*complex_dna_dna_vioD_protein_RNAP_biocrnpyler_420216;
    r27_1_biocrnpyler_420216_k = 10;
  r29_biocrnpyler_420216: complex_dna_dna_vioD_protein_RNAP_biocrnpyler_420216 => dna_dna_vioD_biocrnpyler_420216 + transcript_vioD_biocrnpyler_420216 + protein_RNAP_biocrnpyler_420216; r29_biocrnpyler_420216_k*complex_dna_dna_vioD_protein_RNAP_biocrnpyler_420216;
    r29_biocrnpyler_420216_k = 0.05;
  r30_biocrnpyler_420216: transcript_vioD_biocrnpyler_420216 + protein_Ribo_biocrnpyler_420216 => complex_protein_Ribo_transcript_vioD_biocrnpyler_420216; r30_biocrnpyler_420216_k*transcript_vioD_biocrnpyler_420216*protein_Ribo_biocrnpyler_420216;
    r30_biocrnpyler_420216_k = 100;
  r30_1_biocrnpyler_420216: complex_protein_Ribo_transcript_vioD_biocrnpyler_420216 => transcript_vioD_biocrnpyler_420216 + protein_Ribo_biocrnpyler_420216; r30_1_biocrnpyler_420216_k*complex_protein_Ribo_transcript_vioD_biocrnpyler_420216;
    r30_1_biocrnpyler_420216_k = 10;
  r32_biocrnpyler_420216: complex_protein_Ribo_transcript_vioD_biocrnpyler_420216 => transcript_vioD_biocrnpyler_420216 + enzyme_VioD_biocrnpyler_420216 + protein_Ribo_biocrnpyler_420216; r32_biocrnpyler_420216_k*complex_protein_Ribo_transcript_vioD_biocrnpyler_420216;
    r32_biocrnpyler_420216_k = 0.05;
  r33_biocrnpyler_420216: transcript_vioD_biocrnpyler_420216 + protein_RNAase_biocrnpyler_420216 => complex_protein_RNAase_transcript_vioD_biocrnpyler_420216; r33_biocrnpyler_420216_k*transcript_vioD_biocrnpyler_420216*protein_RNAase_biocrnpyler_420216;
    r33_biocrnpyler_420216_k = 100;
  r33_1_biocrnpyler_420216: complex_protein_RNAase_transcript_vioD_biocrnpyler_420216 => transcript_vioD_biocrnpyler_420216 + protein_RNAase_biocrnpyler_420216; r33_1_biocrnpyler_420216_k*complex_protein_RNAase_transcript_vioD_biocrnpyler_420216;
    r33_1_biocrnpyler_420216_k = 10;
  r35_biocrnpyler_420216: complex_protein_RNAase_transcript_vioD_biocrnpyler_420216 => protein_RNAase_biocrnpyler_420216; r35_biocrnpyler_420216_k*complex_protein_RNAase_transcript_vioD_biocrnpyler_420216;
    r35_biocrnpyler_420216_k = 0.001;
  r36_biocrnpyler_420216: TRP_biocrnpyler_420216 + enzyme_VioA_biocrnpyler_420216 => complex_TRP_enzyme_VioA_biocrnpyler_420216; r36_biocrnpyler_420216_k*TRP_biocrnpyler_420216*enzyme_VioA_biocrnpyler_420216;
    r36_biocrnpyler_420216_k = 10;
  r36_1_biocrnpyler_420216: complex_TRP_enzyme_VioA_biocrnpyler_420216 => TRP_biocrnpyler_420216 + enzyme_VioA_biocrnpyler_420216; r36_1_biocrnpyler_420216_k*complex_TRP_enzyme_VioA_biocrnpyler_420216;
    r36_1_biocrnpyler_420216_k = 1;
  r38_biocrnpyler_420216: complex_TRP_enzyme_VioA_biocrnpyler_420216 => IPA_imine_biocrnpyler_420216 + enzyme_VioA_biocrnpyler_420216; r38_biocrnpyler_420216_k*complex_TRP_enzyme_VioA_biocrnpyler_420216;
    r38_biocrnpyler_420216_k = 203;
  r39_biocrnpyler_420216: 2 IPA_imine_biocrnpyler_420216 + enzyme_VioB_biocrnpyler_420216 => complex_2x_IPA_imine_enzyme_VioB_biocrnpyler_420216; r39_biocrnpyler_420216_k*IPA_imine_biocrnpyler_420216^2*enzyme_VioB_biocrnpyler_420216;
    r39_biocrnpyler_420216_k = 10;
  r39_1_biocrnpyler_420216: complex_2x_IPA_imine_enzyme_VioB_biocrnpyler_420216 => 2 IPA_imine_biocrnpyler_420216 + enzyme_VioB_biocrnpyler_420216; r39_1_biocrnpyler_420216_k*complex_2x_IPA_imine_enzyme_VioB_biocrnpyler_420216;
    r39_1_biocrnpyler_420216_k = 1;
  r41_biocrnpyler_420216: complex_2x_IPA_imine_enzyme_VioB_biocrnpyler_420216 => IPA_imine_dimer_biocrnpyler_420216 + enzyme_VioB_biocrnpyler_420216; r41_biocrnpyler_420216_k*complex_2x_IPA_imine_enzyme_VioB_biocrnpyler_420216;
    r41_biocrnpyler_420216_k = 4500;
  r42_biocrnpyler_420216: IPA_imine_dimer_biocrnpyler_420216 + enzyme_VioE_biocrnpyler_420216 => complex_IPA_imine_dimer_enzyme_VioE_biocrnpyler_420216; r42_biocrnpyler_420216_k*IPA_imine_dimer_biocrnpyler_420216*enzyme_VioE_biocrnpyler_420216;
    r42_biocrnpyler_420216_k = 100;
  r42_1_biocrnpyler_420216: complex_IPA_imine_dimer_enzyme_VioE_biocrnpyler_420216 => IPA_imine_dimer_biocrnpyler_420216 + enzyme_VioE_biocrnpyler_420216; r42_1_biocrnpyler_420216_k*complex_IPA_imine_dimer_enzyme_VioE_biocrnpyler_420216;
    r42_1_biocrnpyler_420216_k = 10;
  r44_biocrnpyler_420216: complex_IPA_imine_dimer_enzyme_VioE_biocrnpyler_420216 => PTDVA_biocrnpyler_420216 + enzyme_VioE_biocrnpyler_420216; r44_biocrnpyler_420216_k*complex_IPA_imine_dimer_enzyme_VioE_biocrnpyler_420216;
    r44_biocrnpyler_420216_k = 100;
  r45_biocrnpyler_420216: PTDVA_biocrnpyler_420216 + enzyme_VioD_biocrnpyler_420216 => complex_PTDVA_enzyme_VioD_biocrnpyler_420216; r45_biocrnpyler_420216_k*PTDVA_biocrnpyler_420216*enzyme_VioD_biocrnpyler_420216;
    r45_biocrnpyler_420216_k = 100;
  r45_1_biocrnpyler_420216: complex_PTDVA_enzyme_VioD_biocrnpyler_420216 => PTDVA_biocrnpyler_420216 + enzyme_VioD_biocrnpyler_420216; r45_1_biocrnpyler_420216_k*complex_PTDVA_enzyme_VioD_biocrnpyler_420216;
    r45_1_biocrnpyler_420216_k = 10;
  r47_biocrnpyler_420216: complex_PTDVA_enzyme_VioD_biocrnpyler_420216 => PTVA_2_combined + enzyme_VioD_biocrnpyler_420216; r47_biocrnpyler_420216_k*complex_PTDVA_enzyme_VioD_biocrnpyler_420216;
    r47_biocrnpyler_420216_k = 100;
  r0_biocrnpyler_893799: dna_dna_vioC_biocrnpyler_893799 + protein_RNAP_biocrnpyler_893799 => complex_dna_dna_vioC_protein_RNAP_biocrnpyler_893799; r0_biocrnpyler_893799_k*dna_dna_vioC_biocrnpyler_893799*protein_RNAP_biocrnpyler_893799;
    r0_biocrnpyler_893799_k = 100;
  r0_1_biocrnpyler_893799: complex_dna_dna_vioC_protein_RNAP_biocrnpyler_893799 => dna_dna_vioC_biocrnpyler_893799 + protein_RNAP_biocrnpyler_893799; r0_1_biocrnpyler_893799_k*complex_dna_dna_vioC_protein_RNAP_biocrnpyler_893799;
    r0_1_biocrnpyler_893799_k = 10;
  r2_biocrnpyler_893799: complex_dna_dna_vioC_protein_RNAP_biocrnpyler_893799 => dna_dna_vioC_biocrnpyler_893799 + transcript_vioC_biocrnpyler_893799 + protein_RNAP_biocrnpyler_893799; r2_biocrnpyler_893799_k*complex_dna_dna_vioC_protein_RNAP_biocrnpyler_893799;
    r2_biocrnpyler_893799_k = 0.05;
  r3_biocrnpyler_893799: transcript_vioC_biocrnpyler_893799 + protein_Ribo_biocrnpyler_893799 => complex_protein_Ribo_transcript_vioC_biocrnpyler_893799; r3_biocrnpyler_893799_k*transcript_vioC_biocrnpyler_893799*protein_Ribo_biocrnpyler_893799;
    r3_biocrnpyler_893799_k = 100;
  r3_1_biocrnpyler_893799: complex_protein_Ribo_transcript_vioC_biocrnpyler_893799 => transcript_vioC_biocrnpyler_893799 + protein_Ribo_biocrnpyler_893799; r3_1_biocrnpyler_893799_k*complex_protein_Ribo_transcript_vioC_biocrnpyler_893799;
    r3_1_biocrnpyler_893799_k = 10;
  r5_biocrnpyler_893799: complex_protein_Ribo_transcript_vioC_biocrnpyler_893799 => transcript_vioC_biocrnpyler_893799 + enzyme_VioC_biocrnpyler_893799 + protein_Ribo_biocrnpyler_893799; r5_biocrnpyler_893799_k*complex_protein_Ribo_transcript_vioC_biocrnpyler_893799;
    r5_biocrnpyler_893799_k = 0.05;
  r6_biocrnpyler_893799: transcript_vioC_biocrnpyler_893799 + protein_RNAase_biocrnpyler_893799 => complex_protein_RNAase_transcript_vioC_biocrnpyler_893799; r6_biocrnpyler_893799_k*transcript_vioC_biocrnpyler_893799*protein_RNAase_biocrnpyler_893799;
    r6_biocrnpyler_893799_k = 100;
  r6_1_biocrnpyler_893799: complex_protein_RNAase_transcript_vioC_biocrnpyler_893799 => transcript_vioC_biocrnpyler_893799 + protein_RNAase_biocrnpyler_893799; r6_1_biocrnpyler_893799_k*complex_protein_RNAase_transcript_vioC_biocrnpyler_893799;
    r6_1_biocrnpyler_893799_k = 10;
  r8_biocrnpyler_893799: complex_protein_RNAase_transcript_vioC_biocrnpyler_893799 => protein_RNAase_biocrnpyler_893799; r8_biocrnpyler_893799_k*complex_protein_RNAase_transcript_vioC_biocrnpyler_893799;
    r8_biocrnpyler_893799_k = 0.001;
  r9_biocrnpyler_893799: PTVA_2_combined + enzyme_VioC_biocrnpyler_893799 => complex_PTVA_enzyme_VioC_biocrnpyler_893799; r9_biocrnpyler_893799_k*PTVA_2_combined*enzyme_VioC_biocrnpyler_893799;
    r9_biocrnpyler_893799_k = 100;
  r9_1_biocrnpyler_893799: complex_PTVA_enzyme_VioC_biocrnpyler_893799 => PTVA_2_combined + enzyme_VioC_biocrnpyler_893799; r9_1_biocrnpyler_893799_k*complex_PTVA_enzyme_VioC_biocrnpyler_893799;
    r9_1_biocrnpyler_893799_k = 10;
  r11_biocrnpyler_893799: complex_PTVA_enzyme_VioC_biocrnpyler_893799 => V_biocrnpyler_893799 + enzyme_VioC_biocrnpyler_893799; r11_biocrnpyler_893799_k*complex_PTVA_enzyme_VioC_biocrnpyler_893799;
    r11_biocrnpyler_893799_k = 100;
  r12_biocrnpyler_893799: PTDVA_biocrnpyler_893799 + enzyme_VioC_biocrnpyler_893799 => complex_PTDVA_enzyme_VioC_biocrnpyler_893799; r12_biocrnpyler_893799_k*PTDVA_biocrnpyler_893799*enzyme_VioC_biocrnpyler_893799;
    r12_biocrnpyler_893799_k = 100;
  r12_1_biocrnpyler_893799: complex_PTDVA_enzyme_VioC_biocrnpyler_893799 => PTDVA_biocrnpyler_893799 + enzyme_VioC_biocrnpyler_893799; r12_1_biocrnpyler_893799_k*complex_PTDVA_enzyme_VioC_biocrnpyler_893799;
    r12_1_biocrnpyler_893799_k = 10;
  r14_biocrnpyler_893799: complex_PTDVA_enzyme_VioC_biocrnpyler_893799 => DV_biocrnpyler_893799 + enzyme_VioC_biocrnpyler_893799; r14_biocrnpyler_893799_k*complex_PTDVA_enzyme_VioC_biocrnpyler_893799;
    r14_biocrnpyler_893799_k = 100;

  // Unit definitions:
  unit square_metre = metre^2;
  unit per_second = 1 / second;
  unit substance = dimensionless;
end
